# PRE PROCESSING
# User Input
# Girder spacing
w_g := 9 ft + 10 in
# Number of girder lines in analysis
n := 2
# Equation modifiers
[c_I_yc; c_w_g] :=
    if n == 2
        [1; 1]
    else if n == 3
        [3/2; 2]
    else
        [2; 3]
c_I_yc = 1
c_w_g = 1
γ_DC := 1.5
η_DC := 1.5/1.25 = 1.2  # To convert from Strength (γ == 1.25) to buckling LF (γ == 1.5)
w_g := c_w_g*w_g = 9.83333 ft
# Include PCA for Phase
# [reference: PCA_13_Span A Lines 3 and 4 FULL_INACTIVE.mcdx]
# Re-factor the ultimate moment to convert from strength to buckling
mucol :=
    M ← identity(rows(results))[:, 0]
    M[0, 0] ← "Muz (kip-ft)"
    for i ∈ 1 .. rows(results) - 1
        secval ← results[i, 1]
        mz ← vlookup(secval, global_moment, 2)
        M[i, 0] ← |mz*η_DC|
    M
    = [
        "Muz (kip-ft)"; 194.398; 298.735; 0; 0; 0; 0; 147.281; 0; 0
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    ]
res := augment(results[:, 0], results[:, 1], mucol)
# Include girder sections:
# Initialize the properties array
props := ["Girder", "Section", "L (ft)", "Iz (in4)", "Iyc (in4)", "Iyt (in4)", "c (in)", "t (in)", "Iyeff (in4)"]
# [reference: I-Girder Properties and Bending Strength_3AS1.mcdx]
data :=
    section ← "3AS1"
    girder ← concat("G", substr(section, 0, 2))
    l ←
        tinp ← READEXCEL("..\1200002-02 Seed File_WJL.xlsm", "Section Database!A3:S58")
        row ← min(match(concat("G", section), tinp[:, 12]))
        tinp[row, 15]
    iz ← I_z/in^4
    iyc ← t_fc*b_fc^3/12/in^4*c_I_yc
    iyt ← t_ft*b_ft^3/12/in^4
    [c; t] ←
        if comp_flg == "Top"
            [d - y_ENA - t_f_top/2; y_ENA - t_f_bottom/2]/in
        else
            [y_ENA - t_f_bottom/2; d - y_ENA - t_f_top/2]/in
    iyeff ← iyc + (t/c)*iyt
    [girder, section, l, iz, iyc, iyt, c, t, iyeff]
    = ["G3A", "3AS1", 82.2135, 60632.9, 364.5, 486, 39.8631, 35.0119, 791.355]
props := stack(props, data)
data :=
    section ← "4AS1"
    girder ← concat("G", substr(section, 0, 2))
    l ←
        tinp ← READEXCEL("..\1200002-02 Seed File_WJL.xlsm", "Section Database!A3:S58")
        row ← min(match(concat("G", section), tinp[:, 12]))
        tinp[row, 15]
    iz ← I_z/in^4
    iyc ← t_fc*b_fc^3/12/in^4*c_I_yc
    iyt ← t_ft*b_ft^3/12/in^4
    [c; t] ←
        if comp_flg == "Top"
            [d - y_ENA - t_f_top/2; y_ENA - t_f_bottom/2]/in
        else
            [y_ENA - t_f_bottom/2; d - y_ENA - t_f_top/2]/in
    iyeff ← iyc + (t/c)*iyt
    [girder, section, l, iz, iyc, iyt, c, t, iyeff]
    = ["G4A", "4AS1", 83.4479, 60632.9, 364.5, 486, 39.8631, 35.0119, 791.355]
props := stack(props, data)
# [reference: I-Girder Properties and Bending Strength_3BS1.mcdx]
data :=
    section ← "3BS1"
    girder ← concat("G", substr(section, 0, 2))
    l ←
        tinp ← READEXCEL("..\1200002-02 Seed File_WJL.xlsm", "Section Database!A3:S58")
        row ← min(match(concat("G", section), tinp[:, 12]))
        tinp[row, 15]
    iz ← I_z/in^4
    iyc ← t_fc*b_fc^3/12/in^4*c_I_yc
    iyt ← t_ft*b_ft^3/12/in^4
    [c; t] ←
        if comp_flg == "Top"
            [d - y_ENA - t_f_top/2; y_ENA - t_f_bottom/2]/in
        else
            [y_ENA - t_f_bottom/2; d - y_ENA - t_f_top/2]/in
    iyeff ← iyc + (t/c)*iyt
    [girder, section, l, iz, iyc, iyt, c, t, iyeff]
    = ["G3B", "3BS1", 20.0104, 97316.1, 1296, 1440, 38.7812, 36.4062, 2647.81]
props := stack(props, data)
data :=
    section ← "4BS1"
    girder ← concat("G", substr(section, 0, 2))
    l ←
        tinp ← READEXCEL("..\1200002-02 Seed File_WJL.xlsm", "Section Database!A3:S58")
        row ← min(match(concat("G", section), tinp[:, 12]))
        tinp[row, 15]
    iz ← I_z/in^4
    iyc ← t_fc*b_fc^3/12/in^4*c_I_yc
    iyt ← t_ft*b_ft^3/12/in^4
    [c; t] ←
        if comp_flg == "Top"
            [d - y_ENA - t_f_top/2; y_ENA - t_f_bottom/2]/in
        else
            [y_ENA - t_f_bottom/2; d - y_ENA - t_f_top/2]/in
    iyeff ← iyc + (t/c)*iyt
    [girder, section, l, iz, iyc, iyt, c, t, iyeff]
    = ["G4B", "4BS1", 20.0078, 97316.1, 1296, 1440, 38.7812, 36.4062, 2647.81]
props := stack(props, data)
# [reference: I-Girder Properties and Bending Strength_3BS2.mcdx]
data :=
    section ← "3BS2"
    girder ← concat("G", substr(section, 0, 2))
    l ←
        tinp ← READEXCEL("..\1200002-02 Seed File_WJL.xlsm", "Section Database!A3:S58")
        row ← min(match(concat("G", section), tinp[:, 12]))
        tinp[row, 15]/2
    iz ← I_z/in^4
    iyc ← t_fc*b_fc^3/12/in^4*c_I_yc
    iyt ← t_ft*b_ft^3/12/in^4
    [c; t] ←
        if comp_flg == "Top"
            [d - y_ENA - t_f_top/2; y_ENA - t_f_bottom/2]/in
        else
            [y_ENA - t_f_bottom/2; d - y_ENA - t_f_top/2]/in
    iyeff ← iyc + (t/c)*iyt
    [girder, section, l, iz, iyc, iyt, c, t, iyeff]
    = ["G3B", "3BS2", 21, 173910, 2592, 2592, 38.125, 38.125, 5184]
props := stack(props, data)
data :=
    section ← "4BS2"
    girder ← concat("G", substr(section, 0, 2))
    l ←
        tinp ← READEXCEL("..\1200002-02 Seed File_WJL.xlsm", "Section Database!A3:S58")
        row ← min(match(concat("G", section), tinp[:, 12]))
        tinp[row, 15]/2
    iz ← I_z/in^4
    iyc ← t_fc*b_fc^3/12/in^4*c_I_yc
    iyt ← t_ft*b_ft^3/12/in^4
    [c; t] ←
        if comp_flg == "Top"
            [d - y_ENA - t_f_top/2; y_ENA - t_f_bottom/2]/in
        else
            [y_ENA - t_f_bottom/2; d - y_ENA - t_f_top/2]/in
    iyeff ← iyc + (t/c)*iyt
    [girder, section, l, iz, iyc, iyt, c, t, iyeff]
    = ["G4B", "4BS2", 21, 173910, 2592, 2592, 38.125, 38.125, 5184]
props := stack(props, data)
# Analysis Description
# Perform a global buckling analysis for the first two erected girder lines in Span B.  Inactive construction conditions are considered.
# Summary of Ultimate Moments about the Major Axis
# [Excel component]
    excel["Results input!A1"] := res
# Reviewer note:  The ultimate moment M_uz is modified from the Phased Construction Analysis.  For global buckling, a dead load factor of γ_DC = 1.5is used.  For the strength limit state analysis performed in the Phased Construction Analysis, a dead load factor of γ_DC == 1.25is used.  Therefore, the ultimate moments shown here are equal to those found in the Phased Construction Analysis multiplied by 1.5/1.25 = 1.2.
# Summary of Girder Section Properties in the System
# [Excel component]
    excel["Import!A1"] := props
# Length-Weighted Elastic Global Lateral-Torsional Buckling Resistance of the Span System
# [Excel component]
    excel["In!A1"] := props
    excel["Moment In!A1"] := res
    L_1 := excel["Processing!B2"]*ft
    I_yeff1_wt := excel["Processing!D2"]*in^4
    L_2 := excel["Processing!B3"]*ft
    I_yeff2_wt := excel["Processing!D3"]*in^4
    I_z1_wt := excel["Processing!C2"]*in^4
    M_u1 := excel["Processing!E2"]*kip*ft
    I_z2_wt := excel["Processing!C3"]*in^4
    M_u2 := excel["Processing!E3"]*kip*ft
C_bs := 1.1
L := max(L_1, L_2) = 175.466 ft
M_u1 = 194.398 kip*ft
M_u2 = 298.735 kip*ft
I_yeff := (I_yeff1_wt*L_1 + I_yeff2_wt*L_2)/(L_1 + L_2) = 2536.01 in^4
I_z := (I_z1_wt*L + I_z2_wt*L_2)/(L_1 + L_2) = 103266 in^4
M_gs := 0.7*C_bs*π^2*E*w_g/L^2*sqrt(I_yeff*I_z) = 7910.31 kip*ft
M_u := M_u1 + M_u2 = 493.133 kip*ft
# Factor of Safety, FS := M_gs/M_u = 16.0409
