# Pre-Processing
# Enter Unbraced Lengths
L_b_G1F := 61.42 ft
L_b_G1G := 61.42 ft
L_b_G2G := 17.33 ft
# Define the Global and Local Wind Loading
# Include wind loading analysis and process variables
# [reference: Wind General.mcdx]
w_A := augment(w_A_active, w_A_inactive)
w_B := augment(w_B_active, w_B_inactive)
w_C := augment(w_C_active, w_C_inactive)
w_D := augment(w_D_active, w_D_inactive)
w_E := augment(w_E_active, w_E_inactive)
w_F := augment(w_F_active, w_F_inactive)
w_G := augment(w_G_active, w_G_inactive)
# Is the condition ACTIVE or INACTIVE?
condition := 0  # list choice: Active = 0, Inactive = 1
w_A := w_A[:, condition]
w_B := w_B[:, condition]
w_C := w_C[:, condition]
w_D := w_D[:, condition]
w_E := w_E[:, condition]
w_F := w_F[:, condition]
w_G := w_G[:, condition]
DWS :=
    if condition == 0
        V_active
    else
        V_inactive*R_inactive
    = 20 mph
# Resistance Factors
ϕ_f := 0.90
ϕ_t := 0.95
# Calculate Distributed Wind Loads Per AASHTO Wind 4.2.2.1
# Manually determine the distribution....
w_Favg := w_F[0] = 0.0150592 kip/ft
w_Gavg := (w_G[0] + w_G[1])/2 = 0.00740939 kip/ft
# Enter the Global and Local Wind Moment Distribution Table
table  # each column defines a variable
    GirderLine | L_b | w_avg | w_l_east | w_l_west
    "1F" | L_b_G1F | w_Favg | 0*kip/ft | 0*kip/ft
    "1G" | L_b_G1G | w_Gavg | w_G[1] | w_G[0]
    "2G" | L_b_G2G | w_Gavg | w_G[0] | w_G[1]
end table
wind_table := stack(["Girder", "Averaged Wind Load (kip/ft)", "Local Wind Load - East (kip/ft)", "Local Wind Load - West (kip/ft)"], augment(GirderLine, w_avg/(kip/ft), w_l_east/(kip/ft), w_l_west/(kip/ft)))
# STAAD Load Cases
Strength_WindWEST := 8
Strength_WindEAST := 10
Service_WindWEST := 14
Service_WindEAST := 19
# STAAD Data Dump & Data Analysis
# Double-click the spreadsheet area and paste STAAD Output data to the various tabs.  The tabs will analyze and summarize the data and will return values back to this spreadsheet.
# [Excel component]
    global_moment := excel["Output 1 - Global Moments!A:J"]
# Input Girder Section Properties and Define the Member Properties Matrix
# Initialize the properties array
props := [0, 0, 0, 0, 0, 0, 0, 0, 0, 0, 0, 0, 0, 0]
# Include the various girder sections.  Try to keep these in order.  Girder type (A thru G) come first, then girder lines.
# [reference: I-Girder Properties and Bending Strength_1FS1.mcdx]
props :=
    ID ← "1FS1"
    L_b ← L_b_G1F
    if props[0, 0] == 0
        [ID, S_yc/in^3, S_zc/in^3, F_yc/ksi, Fgov(L_b)/ksi, F_cr(L_b)/ksi, F_crw/ksi, L_p/ft, L_r/ft, L_b/ft, R_b, R_h, C_b, λ_rw]
    else
        stack(props, [ID, S_yc/in^3, S_zc/in^3, F_yc/ksi, Fgov(L_b)/ksi, F_cr(L_b)/ksi, F_crw/ksi, L_p/ft, L_r/ft, L_b/ft, R_b, R_h, C_b, λ_rw])
# [reference: I-Girder Properties and Bending Strength_1FS2.mcdx]
props :=
    ID ← "1FS2"
    L_b ← L_b_G1F
    if props[0, 0] == 0
        [ID, S_yc/in^3, S_zc/in^3, F_yc/ksi, Fgov(L_b)/ksi, F_cr(L_b)/ksi, F_crw/ksi, L_p/ft, L_r/ft, L_b/ft, R_b, R_h, C_b, λ_rw]
    else
        stack(props, [ID, S_yc/in^3, S_zc/in^3, F_yc/ksi, Fgov(L_b)/ksi, F_cr(L_b)/ksi, F_crw/ksi, L_p/ft, L_r/ft, L_b/ft, R_b, R_h, C_b, λ_rw])
# [reference: I-Girder Properties and Bending Strength_1FS3_Positive.mcdx]
props :=
    ID ← "1FS3"
    L_b ← L_b_G1F
    if props[0, 0] == 0
        [ID, S_yc/in^3, S_zc/in^3, F_yc/ksi, Fgov(L_b)/ksi, F_cr(L_b)/ksi, F_crw/ksi, L_p/ft, L_r/ft, L_b/ft, R_b, R_h, C_b, λ_rw]
    else
        stack(props, [ID, S_yc/in^3, S_zc/in^3, F_yc/ksi, Fgov(L_b)/ksi, F_cr(L_b)/ksi, F_crw/ksi, L_p/ft, L_r/ft, L_b/ft, R_b, R_h, C_b, λ_rw])
# [reference: I-Girder Properties and Bending Strength_1GS1.mcdx]
props :=
    ID ← "1GS1"
    L_b ← L_b_G1G
    if props[0, 0] == 0
        [ID, S_yc/in^3, S_zc/in^3, F_yc/ksi, Fgov(L_b)/ksi, F_cr(L_b)/ksi, F_crw/ksi, L_p/ft, L_r/ft, L_b/ft, R_b, R_h, C_b, λ_rw]
    else
        stack(props, [ID, S_yc/in^3, S_zc/in^3, F_yc/ksi, Fgov(L_b)/ksi, F_cr(L_b)/ksi, F_crw/ksi, L_p/ft, L_r/ft, L_b/ft, R_b, R_h, C_b, λ_rw])
props :=
    ID ← "2GS1"
    L_b ← L_b_G2G
    if props[0, 0] == 0
        [ID, S_yc/in^3, S_zc/in^3, F_yc/ksi, Fgov(L_b)/ksi, F_cr(L_b)/ksi, F_crw/ksi, L_p/ft, L_r/ft, L_b/ft, R_b, R_h, C_b, λ_rw]
    else
        stack(props, [ID, S_yc/in^3, S_zc/in^3, F_yc/ksi, Fgov(L_b)/ksi, F_cr(L_b)/ksi, F_crw/ksi, L_p/ft, L_r/ft, L_b/ft, R_b, R_h, C_b, λ_rw])
# Girder Stress Analysis Algorithm
# The following algorithm will analyze each girder section for the load cases entered above by the user (not all STAAD load cases).
results :=
    num_sections ← rows(props)
    results ← ["Girder", "Section", "Lb", "Muz", "ϕMnz", "Utilization Mz", "Muy East Global", "Muy East Local", "Muy East Total", "Muy West Global", "Muy West Local", "Muy West Total", "Governing Muy", "2nd Order Amp. Factor", "AF*Gov Muy", "ϕMny", "Utilization My", "Utilization Overall", "Constructability Check 1", "Constructability Check 2"]
    for i ∈ 0 .. num_sections - 1
        [ID, S_yc, S_zc, F_yc, Fgov, F_cr, F_crw, L_p, L_r, L_b, R_b, R_h, C_b, λ_rw] ← props[i, :]
        Girder ← concat("G", substr(ID, 0, 2))
        S_yc ← S_yc*in^3
        S_zc ← S_zc*in^3
        F_yc ← F_yc*ksi
        F_nc ← Fgov*ksi
        F_cr ← F_cr*ksi
        F_crw ← F_crw*ksi
        L_p ← L_p*ft
        L_r ← L_r*ft
        L_b ← L_b*ft
        M_uz ← vlookup(ID, global_moment, 3)[0]*kip*ft
        M_uy_east ← vlookup(ID, global_moment, 9)[0]*kip*ft
        M_uy_west ← vlookup(ID, global_moment, 6)[0]*kip*ft
        M_L_east ←
            lid ← substr(ID, 0, 2)
            pos ← match(lid, GirderLine)[0]
            w_l_east[pos]*L_b^2/10
        M_L_west ←
            lid ← substr(ID, 0, 2)
            pos ← match(lid, GirderLine)[0]
            w_l_west[pos]*L_b^2/10
        ϕM_zn ← ϕ_f*F_nc*S_zc
        utilization_Mz ← M_uz/ϕM_zn
        f_buc ← M_uz/S_zc
        AF ←
            if L_b ≤ 1.2*L_p*sqrt(C_b*R_b/(M_uz/ϕM_zn))
                1.0
            else
                max(1.0, 0.85/(1 - f_buc/F_cr))
        M_uy_east_tot ← AF*(M_uy_east + M_L_east)
        M_uy_west_tot ← AF*(M_uy_west + M_L_west)
        M_uy_tot ← max(M_uy_east_tot, M_uy_west_tot)
        utilization_My ← M_uy_tot/(ϕ_f*0.6*F_yc*S_yc)
        utilization_overall ← (f_buc + 1/3*M_uy_tot/S_yc)/(ϕ_f*F_nc)
        utilization_constr1 ← (f_buc + M_uy_tot/S_yc)/(ϕ_f*R_h*F_yc)
        utilization_constr2 ←
            if λ_rw < 5.7*sqrt(E/F_yc)
                0
            else
                f_buc/(ϕ_f*F_crw)
        array ← [Girder, ID, L_b/ft, M_uz/(kip*ft), ϕM_zn/(kip*ft), utilization_Mz, M_uy_east/(kip*ft), M_L_east/(kip*ft), (M_uy_east + M_L_east)/(kip*ft), M_uy_west/(kip*ft), M_L_west/(kip*ft), (M_uy_west + M_L_west)/(kip*ft), max((M_uy_east + M_L_east)/(kip*ft), (M_uy_west + M_L_west)/(kip*ft)), AF, M_uy_tot/(kip*ft), ϕ_f*0.6*F_yc*S_yc/(kip*ft), utilization_My, utilization_overall, utilization_constr1, utilization_constr2]
        results ← stack(results, array)
    return results
[gov_cond; gov_sec; gov_gird; gov_util; grow] :=
    heading ← ["Major Axis Bending", "Lateral Bending", "Combined Bending", "Constructability A6.10.3.2.1-1", "Constructability A6.10.3.2.2-3"]
    lastrow ← rows(results) - 1
    util_matrix ← augment(submatrix(results, 1, lastrow, 5, 5), submatrix(results, 1, lastrow, 16, 19))
    gov_util ← max(util_matrix)
    for i ∈ 1 .. lastrow
        for j ∈ 1 .. 5
            compval ← util_matrix[i - 1, j - 1]
            if compval == gov_util
                gov_sec ← results[i, 1]
                gov_gird ← results[i, 0]
                gov_cond ← heading[0, j - 1]
                grow ← i
                break
    return [gov_cond; gov_sec; gov_gird; gov_util; grow]
    = ["Combined Bending"; "1GS1"; "G1G"; 0.632221; 4]
# Export parameters from governing condition for analysis documentation
prow := match(gov_sec, props[:, 0])[0] = 3
[ID, S_yc, S_zc, F_yc, Fgov, F_cr, F_crw, L_p, L_r, L_b, R_b, R_h, C_b, λ_rw] := props[prow, :]
S_yc := S_yc*in^3
S_zc := S_zc*in^3
F_nc := Fgov*ksi
F_cr := F_cr*ksi
L_p := L_p*ft
L_r := L_r*ft
L_b := L_b*ft
F_yc := F_yc*ksi
F_crw := F_crw*ksi
gm_row := match(gov_sec, global_moment[:, 0])[0] = 7
M_uz := global_moment[gm_row, 3]*kip*ft = 441.92 kip*ft
M_uy_east := global_moment[gm_row, 9]*kip*ft = 22.692 kip*ft
M_uy_west := global_moment[gm_row, 6]*kip*ft = 22.7 kip*ft
[w_L_east; w_L_west] :=
    lid ← substr(gov_sec, 0, 2)
    pos ← match(lid, GirderLine)[0]
    return [w_l_east[pos]; w_l_west[pos]]
# Analysis Description
# This analysis considers active construction conditions for paired girders G1G & G2G and single girder G1F.  The paired girders will be held by a crane while girder G1F is spliced with girder G1G.  The paired girders will have all cross frames pre-installed, except for the frame nearest the splice.  Girder G1F will have no intermediate cross frame support until girder G2F is erected in the subsequent phase.
# Stability Conditions
# - Girder Line 1 @ Pier 3:  EF-TG HLMR Bearing must be restrained in the transverse direction for stability
# - Girder Line 1 @ Abutment B:  EE ("Floating") HLMR Bearing must be restrained in the transverse direction for stability
# - ACTIVE WIND SPEED MUST NOT EXCEED 20MPH UNTIL THE FULL GIRDER LINE 2 IS ERECTED.
# - Crane must provide a minimum of 25,700 lbs holding force
# - Bearing translations and rotations will be checked for the inactive condition in the subsequent phase of erection as Girder Line 2 with indicated cross frames must be erected prior to end of shift.
# Loading Notes
# - The self-weight dead load of the splice plates at both ends of girder G1F are applied as point loads.
# - Wind pressures for paired girders G1G and G2G are averaged in accordance with AASHTO Wind 4.2.2.1.
# - Local moments due to wind pressure will not develop in the single girder G1F in this erection phase.  Local moments will be considered for girders G1G and G2G.
# Schematic
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# Figure 1:  Erection Analysis Schematic
# Application of Global and Local Wind Loads on the Erected Girders
# [Excel component]
    excel["Sheet1!A2"] := wind_table
    excel["Sheet1!A1"] :=
        a ← "Design Wind Speed for "
        b ←
            if condition == 0
                "Active Construction = "
            else
                "Inactive Construction = "
        c ← num2str(DWS/mph)
        d ← " mph"
        concat(a, b, c, d)
# Table 1:  Summary of applied global and local wind loading
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# Figure 2:  Wind loading from the West direction (See table for magnitudes)
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# Figure 3:  Wind loading from East direction (See Table 1 for magnitudes)
# Girder Stress Analysis
# Reviewer Note:  The sign convention used by STAAD.pro for Major-Axis Bending (Mz) is as follows:  Positive = tension on the TOP of the girder; Negative = tension on the BOTTOM of the girder. Absolute values of all moments are used in the subsequent calculations.  Compression flanges are displayed for each section under consideration.
# [Excel component]
    excel["Automatic Input!A1"] := results
# Table 2:  Governing girder stress analysis loads and resistance values
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# Figure 4:  Major axis bending (See Table 2 for governing magnitudes)
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# Figure 5:  Lateral bending - Wind from EAST (See Table 2 for governing magnitudes)
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# Figure 6:  Lateral bending - Wind from WEST (See Table 2 for governing magnitudes)
# Calculation of Governing Condition
# Governing girder, gov_gird = "G1G" | Governing limit state, gov_cond = "Combined Bending"
# Major Axis Bending
M_uz = 441.92 kip*ft
f_buc := M_uz/S_zc = 3.46087 ksi
F_nc = 8.82655 ksi
F_yc = 50 ksi
S_zc = 1532.28 in^3
ϕM_zn := ϕ_f*F_nc*S_zc = 1014.36 kip*ft
M_uz/ϕM_zn = 0.435664
# Lateral Bending
M_uy_east = 22.692 kip*ft
M_uy_west = 22.7 kip*ft
L_b = 61.42 ft
L_p = 8.51051 ft
F_cr = 8.82655 ksi
# Additive local moment per AASHTO Wind C4.2.2.1
w_L_east = 0 kip/ft
M_L_east := w_L_east*L_b^2/10 = 0 kip*ft
w_L_west = 0.0148188 kip/ft
M_L_west := w_L_west*L_b^2/10 = 5.59026 kip*ft
# Second-Order compression flange lateral bending amplification factor per AASHTO 6.10.1.6
AF :=
    if L_b ≤ 1.2*L_p*sqrt(C_b*R_b/(M_uz/(F_yc*S_zc)))
        1.0
    else
        max(1.0, 0.85/(1 - f_buc/F_cr))
    = 1.39825
# Total Lateral Moment
M_uy := max([AF*(M_uy_east + M_L_east); AF*(M_uy_west + M_L_west)]) = 39.5569 kip*ft
M_uy/(ϕ_f*0.6*F_yc*S_yc) = 0.173491
# Constructability - Flexure | Overall Combined Bending
[utilization_constr1; utilization_constr2] :=
    chk1 ← (f_buc + M_uy/S_yc)/(ϕ_f*R_h*F_yc)
    if λ_rw < 5.7*sqrt(E/F_yc)
        utilization_chk2 ← 0
    else
        chk2 ← f_buc/(ϕ_f*F_crw)
    return [chk1; chk2]
    = [0.181003; 0]
(f_buc + 1/3*M_uy/S_yc)/(ϕ_f*F_nc) = 0.632221
# Bearing Strength and Serviceability Analysis
# Compare the bearing translations and rotations from the SERVICE limit state analysis, and compare the vertical and horizontal design forces from the STRENGTH limit state against the allowable values listed in the approved construction drawings.
# Reaction Force Check - Strength Limit State
# [Excel component]
    brg_data_table := excel["Bearing Data Table!A1:K27"]
# Table 3:  Reaction forces for STRENGTH limit state checked against allowable design values
# Translation and Rotation Check - Service Limit State
# [Excel component]
    excel["Bearing Data Table!A1"] := brg_data_table
# Table 4 (above):  Bearing translations for SERVICE limit state checked against allowable design values;
# Table 5 (below):  Bearing rotations for SERVICE limit state checked against allowable design values.
