# Input
# Enter the Girder ID, ensuring it is logically matched to the Excel database
Girder := "G1S1"
# Enter longitudinal stiffener info
lstiff := ""  # list choice: "Y" = "", "N" = ""
d_s := 0 in
# Material Properties
F_y_top := 42 ksi
f'_c := 3 ksi
F_y_w := 42 ksi
F_y_bottom := 42 ksi
E_c := 57*sqrt(f'_c/psi)*ksi = 3122.02 ksi
E := 29000 ksi
G := 11300 ksi
n := E/E_c = 9.28886
# Effective Deck Geometry
t_eff := 7.5 in
b_e := 6 ft + 6.5 in
# Location of Flange in Compression
comp_flg := ""Top""  # list choice: "Top" = ""Top"", "Bottom" = ""Bottom"
# Bending Moment Gradient Coefficient
C_b := 1.0
# Excel import or enter these manually
# Import an Excel File
import := READEXCEL(".\Section Properties.xlsx", "Sheet1!A1:S63")
row := min(match(Girder, import[:, 13]))
b_f_top := import[row, 2]*in = 1 ft
t_f_top := import[row, 3]*in = 0.0625 ft
D_w := import[row, 4]*in = 3.66667 ft
t_w := import[row, 5]*in = 0.03125 ft
b_f_bottom := import[row, 6]*in = 1 ft
row = 2
t_f_bottom := import[row, 7]*in = 0.0625 ft
s_0 := import[row, 9]*in = 0.611083 ft
L := import[row, 14]*ft = 204 ft
# Background Calcs
# General
d := t_f_bottom + D_w + t_f_top = 45.5 in
# Top Flange
A_tf := b_f_top*t_f_top = 9 in^2
y_i_tf := d - t_f_top/2 = 45.125 in
I_z0_tf := b_f_top*t_f_top^3/12 = 0.421875 in^4
# Web
A_w := D_w*t_w = 16.5 in^2
y_i_w := t_f_bottom + D_w/2 = 22.75 in
I_z0_w := t_w*D_w^3/12 = 2662 in^4
# Bottom Flange
A_bf := b_f_bottom*t_f_bottom = 9 in^2
y_i_bf := t_f_bottom/2 = 0.375 in
I_z0_bf := b_f_bottom*t_f_bottom^3/12 = 0.421875 in^4
# Transformed Slab
A_st := b_e*t_eff/n = 63.3824 in^2
y_i_st := t_f_bottom + D_w + t_f_top + t_eff/2 = 49.25 in
# Gross Section
A_g := A_tf + A_w + A_bf = 34.5 in^2
A_gc := A_g + A_st = 97.8824 in^2
y_ENA := (A_tf*y_i_tf + A_w*y_i_w + A_bf*y_i_bf)/A_g = 22.75 in
y_ENAc := (A_tf*y_i_tf + A_w*y_i_w + A_bf*y_i_bf + A_st*y_i_st)/A_gc = 39.9097 in
# About the Local Z-Z Axis - Noncomposite
I_z := I_z0_tf + A_tf*(y_i_tf - y_ENA)^2 + I_z0_w + A_w*(y_i_w - y_ENA)^2 + I_z0_bf + A_bf*(y_i_bf - y_ENA)^2
I_z = 11674.4 in^4
# Elastic Section Modulus
S_z_top := I_z/(d - y_ENA) = 513.159 in^3
S_z_bottom := I_z/y_ENA = 513.159 in^3
# Plastic Section Modulus
y_PNA := (A_g/2 - A_bf)/t_w + t_f_bottom = 22.75 in
Z_z := A_tf*(d - t_f_top/2 - y_PNA) + t_w*(d - t_f_top - y_PNA)^2/2 + A_bf*(y_PNA - t_f_bottom/2) + t_w*(y_PNA - t_f_bottom)^2/2
Z_z = 584.25 in^3
# About the Local Z-Z Axis - Composite
I_zc := I_z0_tf + A_tf*(y_i_tf - y_ENAc)^2 + I_z0_w + A_w*(y_i_w - y_ENAc)^2 + I_z0_bf + A_bf*(y_i_bf - y_ENAc)^2 + A_st*(y_i_st - y_ENAc)^2 + b_e/n*t_eff^3/12
I_zc = 27659.7 in^4
# Elastic Section Modulus - Composite
S_z_top_comp := I_zc/(d + t_eff - y_ENAc) = 2113 in^3
S_z_bottom_comp := I_zc/y_ENAc = 693.058 in^3
# About the Local Y-Y Axis
I_y := (t_f_top*b_f_top^3 + D_w*t_w^3 + t_f_bottom*b_f_bottom^3)/12 = 216.193 in^4
# Elastic Section Modulus
S_y_top := I_y/(b_f_top/2) = 36.0322 in^3
S_y_bottom := I_y/(b_f_bottom/2) = 36.0322 in^3
# Plastic Section Modulus
Z._y := (t_f_top*b_f_top^2 + D_w*t_w^2 + t_f_bottom*b_f_bottom^2)/4 = 55.5469 in^3
# About the Local X-X Axis
J := (b_f_bottom*t_f_bottom^3 + D_w*t_w^3 + b_f_top*t_f_top^3)/3 = 4.14844 in^4
# Assign tension/compression values based on input compression flange designation
D_c :=
    if comp_flg == "Top"
        d - y_ENA - t_f_top
    else
        y_ENA - t_f_bottom
S_zt :=
    if comp_flg == "Top"
        S_z_bottom
    else
        S_z_top
D_cp :=
    if comp_flg == "Top"
        d - y_PNA - t_f_top
    else
        y_PNA - t_f_bottom
S_zc :=
    if comp_flg == "Top"
        S_z_top
    else
        S_z_bottom
F_yc :=
    if comp_flg == "Top"
        F_y_top
    else
        F_y_bottom
S_yt :=
    if comp_flg == "Top"
        S_y_bottom
    else
        S_y_top
b_fc :=
    if comp_flg == "Top"
        b_f_top
    else
        b_f_bottom
S_yc :=
    if comp_flg == "Top"
        S_y_top
    else
        S_y_bottom
t_fc :=
    if comp_flg == "Top"
        t_f_top
    else
        t_f_bottom
S_zt_comp :=
    if comp_flg == "Top"
        S_z_bottom_comp
    else
        S_z_top_comp
b_ft :=
    if comp_flg == "Top"
        b_f_bottom
    else
        b_f_top
S_zc_comp :=
    if comp_flg == "Top"
        S_z_top_comp
    else
        S_z_bottom_comp
t_ft :=
    if comp_flg == "Top"
        t_f_bottom
    else
        t_f_top
F_yt :=
    if comp_flg == "Top"
        F_y_bottom
    else
        F_y_top
# Section Properties - Short-Term Composite
# [Excel component]
    excel["Sheet1!B1:C1"] := Girder
    excel["Sheet1!C3"] := f'_c/ksi
    excel["Sheet1!C4"] := E_c/ksi
    excel["Sheet1!C5"] := n
    excel["Sheet1!C8"] := A_g/in^2
    excel["Sheet1!C9"] := y_ENA/in
    excel["Sheet1!C10"] := A_st/in^2
    excel["Sheet1!C11"] := y_i_st/in
    excel["Sheet1!C12"] := y_ENAc/in
    excel["Sheet1!C6"] := b_e/in
    excel["Sheet1!C7"] := t_eff/in
# Table 1: Composite section components
# Table 1 Notes:
# • 28-day compressive strength determined from allowable stress of 1000psi (S-8520) and Pub 238 Table IP  3.7.2.2-1 "Specified Concrete Strengths for Department Bridges."
# • Any contributing stiffness provided by the concrete barrier has been conservatively neglected
# • Plate girder strength (ASTM A441/A588) conservatively estimated as F_y_top = 42 ksi
# • Haunch thickness & additional slab thickness at overhang are conservatively excluded from section properties
# Strong Axis Composite Moment of Inertia
# Non-composite, I_z = 11674.4 in^4 (previously calculated)
# Transformed Slab Width, b_et := b_e/n = 8.45098 in
I_zc := I_z + A_g*(y_ENA - y_ENAc)^2 + b_et*t_eff^3/12 + A_st*(y_i_st - y_ENAc)^2 = 27659.7 in^4
# Strong Axis Section Moduli
comp_flg = "Top"
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d_c := d + t_eff = 53 in
[y_c; y_t] :=
    if comp_flg == "Top"
        return [d_c - y_ENAc; y_ENAc]
    else
        return [y_ENAc; d_c - y_ENAc]
S_zc := I_zc/y_c = 2113 in^3
S_zt := I_zc/y_t = 693.058 in^3
# Figure 1:  Composite section schematic
