# Overview
# As reported in the NCHRP Report 725, conventional use of the St. Venant torsional stiffness of I-girders results in underestimation of true torsional stiffness.  An equivalent term, J_eq, may be calculated to include in the structural analysis model to account for the contribution of the girder's warping rigidity.
#
# References
# American Institute of Steel Construction (AISC).  (2018).  "Curved Member Design."  Design Guide 33.  Chicago, IL:  AISC.
#
# National Cooperative Highway Research Program (NCHRP).  (2012).  "Guidelines for Analysis Methods and Construction Engineering of Curved and Skewed Steel Girder Bridges."  NCHRP Report 725.  Washington, D.C.: Transportation Research Board.
# Input
# St. Venant Constant, J := 4.1484 in^4
# Warping Constant, C_w := 108138.375 in^6
# Modulus of Elasticity, E := 29000 ksi
# Shear Modulus, G := 0.385*E = 11165 ksi
# Calculations
# The equivalent torsional constant is a function of unbraced length, L_b.  Separate equivalent constants are also evaluated based on warping fixity; one for members with warping fixed at both ends, and one for warping fixed at one end and free at the opposite.
γ(L_b) := L_b*sqrt(G*J/(E*C_w))  # Ref:  AISC Eq. 7-6
# Fixed-Fixed
J_e_fixed(L_b) := J/(1 - sinh(γ(L_b))/γ(L_b) + (cosh(γ(L_b)) - 1)^2/(γ(L_b)*sinh(γ(L_b))))  # Ref:  AISC Eq. 7-5 as mod. by NCHRP Eq. 11
# Fixed-Free
J_e_fixfree(L_b) := J/(1 - sinh(γ(L_b))/(γ(L_b)*cosh(γ(L_b))))  # Ref:  AISC Eq. 7-7 as mod. by NCHRP Eq. 12
x := 5 ft, 5.1 ft .. 75 ft
# [chart]
    X[1] := x/ft
    Y[1] := J_e_fixed(x)/in^4
    X[2] := x/ft
    Y[2] := J_e_fixfree(x)/in^4
