# Input
# Enter the Girder ID, ensuring it is logically matched to the Excel database
Girder := "1AS1"
# Enter longitudinal stiffener info
lstiff := ""  # list choice: "Y" = "", "N" = ""
d_s := 0 in
# Material Properties
F_y_top := 50 ksi
F_y_w := 50 ksi
F_y_bottom := 50 ksi
E := 29000 ksi
G := 11300 ksi
# Location of Flange in Compression
comp_flg := ""Top""  # list choice: "Top" = ""Top"", "Bottom" = ""Bottom"
# Bending Moment Gradient Coefficient
C_b := 1.0
# Excel import or enter these manually
# Import an Excel File
import := READEXCEL("Section Properties.xlsx", "Sheet1!A1:S63")
row := min(match(Girder, import[:, 13]))
b_f_top := import[row, 2]*in = 1 ft
t_f_top := import[row, 3]*in = 0.0625 ft
D_w := import[row, 4]*in = 3.66667 ft
t_w := import[row, 5]*in = 0.03125 ft
b_f_bottom := import[row, 6]*in = 1 ft
t_f_bottom := import[row, 7]*in = 0.0625 ft
s_0 := import[row, 9]*in = 0.611083 ft
L := import[row, 14]*ft = 204 ft
# Background Calcs
# General
d := t_f_bottom + D_w + t_f_top = 45.5 in
d' := D_w + (t_f_bottom + t_f_top)/2 = 44.75 in
# Top Flange
A_tf := b_f_top*t_f_top = 9 in^2
y_i_tf := d - t_f_top/2 = 45.125 in
I_z0_tf := b_f_top*t_f_top^3/12 = 0.421875 in^4
# Web
A_w := D_w*t_w = 16.5 in^2
y_i_w := t_f_bottom + D_w/2 = 22.75 in
I_z0_w := t_w*D_w^3/12 = 2662 in^4
# Bottom Flange
A_bf := b_f_bottom*t_f_bottom = 9 in^2
y_i_bf := t_f_bottom/2 = 0.375 in
I_z0_bf := b_f_bottom*t_f_bottom^3/12 = 0.421875 in^4
# Gross Section
A_g := A_tf + A_w + A_bf = 34.5 in^2
y_ENA := (A_tf*y_i_tf + A_w*y_i_w + A_bf*y_i_bf)/A_g = 22.75 in
# About the Local Z-Z Axis
I_z := I_z0_tf + A_tf*(y_i_tf - y_ENA)^2 + I_z0_w + A_w*(y_i_w - y_ENA)^2 + I_z0_bf + A_bf*(y_i_bf - y_ENA)^2
I_z = 11674.4 in^4
# Elastic Section Modulus
S_z_top := I_z/(d - y_ENA) = 513.159 in^3
S_z_bottom := I_z/y_ENA = 513.159 in^3
# Plastic Section Modulus
y_PNA := (A_g/2 - A_bf)/t_w + t_f_bottom = 22.75 in
Z_z := A_tf*(d - t_f_top/2 - y_PNA) + t_w*(d - t_f_top - y_PNA)^2/2 + A_bf*(y_PNA - t_f_bottom/2) + t_w*(y_PNA - t_f_bottom)^2/2
Z_z = 584.25 in^3
# About the Local Y-Y Axis
I_y := (t_f_top*b_f_top^3 + D_w*t_w^3 + t_f_bottom*b_f_bottom^3)/12 = 216.193 in^4
# Elastic Section Modulus
S_y_top := I_y/(b_f_top/2) = 36.0322 in^3
S_y_bottom := I_y/(b_f_bottom/2) = 36.0322 in^3
# Plastic Section Modulus
Z._y := (t_f_top*b_f_top^2 + D_w*t_w^2 + t_f_bottom*b_f_bottom^2)/4 = 55.5469 in^3
# About the Local X-X Axis
J := (b_f_bottom*t_f_bottom^3 + D_w*t_w^3 + b_f_top*t_f_top^3)/3 = 4.14844 in^4
# Torsional Warping Constant
α := 1/(1 + (b_f_top/b_f_bottom)^3*(t_f_top/t_f_bottom)) = 0.5
C_w := d'^2*b_f_top^3*t_f_top*α/12 = 108138 in^6
# Assign tension/compression values based on input compression flange designation
D_c :=
    if comp_flg == "Top"
        d - y_ENA - t_f_top
    else
        y_ENA - t_f_bottom
S_zt :=
    if comp_flg == "Top"
        S_z_bottom
    else
        S_z_top
D_cp :=
    if comp_flg == "Top"
        d - y_PNA - t_f_top
    else
        y_PNA - t_f_bottom
S_zc :=
    if comp_flg == "Top"
        S_z_top
    else
        S_z_bottom
F_yc :=
    if comp_flg == "Top"
        F_y_top
    else
        F_y_bottom
S_yt :=
    if comp_flg == "Top"
        S_y_bottom
    else
        S_y_top
b_fc :=
    if comp_flg == "Top"
        b_f_top
    else
        b_f_bottom
S_yc :=
    if comp_flg == "Top"
        S_y_top
    else
        S_y_bottom
t_fc :=
    if comp_flg == "Top"
        t_f_top
    else
        t_f_bottom
b_ft :=
    if comp_flg == "Top"
        b_f_bottom
    else
        b_f_top
t_ft :=
    if comp_flg == "Top"
        t_f_bottom
    else
        t_f_top
F_yt :=
    if comp_flg == "Top"
        F_y_bottom
    else
        F_y_top
# Section Properties
# [Excel component]
    excel["Sheet1!C3:D3"] := A_g/in^2
    excel["Sheet1!B1"] := Girder
    excel["Sheet1!C4"] := b_fc/in
    excel["Sheet1!D4"] := b_ft/in
    excel["Sheet1!C5"] := t_fc/in
    excel["Sheet1!D5"] := t_ft/in
    excel["Sheet1!C6"] := D_c/in
    excel["Sheet1!C7"] := D_cp/in
    excel["Sheet1!C8"] := F_yc/ksi
    excel["Sheet1!D8"] := F_yt/ksi
    excel["Sheet1!C9:D9"] := I_z/in^4
    excel["Sheet1!C10"] := S_zc/in^3
    excel["Sheet1!D10"] := S_zt/in^3
    excel["Sheet1!C11:D11"] := Z_z/in^3
    excel["Sheet1!C12:D12"] := I_y/in^4
    excel["Sheet1!C13"] := S_yc/in^3
    excel["Sheet1!D13"] := S_yt/in^3
    excel["Sheet1!C14:D14"] := J/in^4
    excel["Sheet1!C15:D15"] := C_w/in^6
# Flexural Resistance
# Hybrid Factor
R_h == (12 + β*(3*ρ - ρ^3))/(12 + 2*β)
# where:
[D_n; A_fn] :=
    n1 ← d - y_ENA - t_f_top
    n2 ← y_ENA - t_f_bottom
    if n1 ≤ n2
        return [n1; t_f_top*b_f_top]
    else
        return [n2; t_f_bottom*b_f_bottom]
    = [1.83333 ft; 0.0625 ft^2]
β := 2*D_n*t_w/A_fn = 1.83333
ρ :=
    f_n ← F_y_bottom
    min(1.0, F_y_w/f_n)
    = 1
R_h :=
    if F_y_w ≥ min(F_y_top, F_y_bottom)
        1.0
    else
        (12 + β*(3*ρ - ρ^3))/(12 + 2*β)
    = 1
# Web Bend-Buckling (per AASHTO Section 6.10.1.9.1)
F_crw == 0.9*E*k/(D_w/t_w)^2 < min(R_h*F_yc, F_y_w/0.7)
# where:
k := 9/(D_c/D_w)^2 = 36
F_crw := min(0.9*E*k/(D_w/t_w)^2, min(R_h*F_yc, F_y_w/0.7)) = 50 ksi
# Flange Strength Reduction Factors (per AASHTO Section 6.10.1.10)
R_h = 1
# Web Load-Shedding Factor
a_wc := 2*D_c*t_w/(b_fc*t_fc) = 1.83333
# Limiting slenderness ratio for a compact web
λ_rw :=
    if lstiff == "Y"
        λ_rwD ← 0.95*sqrt(E*k/F_yc)
        (2*D_c/D_w)*λ_rwD
    else
        max(min((3.1 + 5.0/a_wc)*sqrt(E/F_yc), 5.7*sqrt(E/F_yc)), 4.6*sqrt(E/F_yc))
λ_rw = 137.274
R_b :=
    if 2*D_c/t_w < λ_rw
        1.0
    else
        if lstiff == "Y" and d_s/D_c < 0.76
            λ_rwD ← 0.95*sqrt(E*k/F_yc)
            min(1.07 - 0.12*D_c/D_w - a_wc/(1200 + 300*a_wc)*(D_w/t_w - λ_rwD), 1.0)
        else
            min(1.0 - a_wc/(1200 + 300*a_wc)*(2*D_c/t_w - λ_rw), 1.0)
R_b = 1
# Compression Flange Flexural Resistance (per AASHTO 6.10.8.2)
# Slenderness ratio limits
λ_f := b_fc/(2*t_fc) = 8
λ_pf := 0.38*sqrt(E/F_yc) = 9.15161
F_yr := max(min(0.7*F_yc, F_y_w), 0.5*F_yc) = 35 ksi
λ_rf := 0.56*sqrt(E/F_yr) = 16.1196
# Unbraced Length Limits
r_t := b_fc/sqrt(12*(1 + D_c*t_w/(3*b_fc*t_fc))) = 3.03175 in  # Effective radius of gyration
L_p := 1.0*r_t*sqrt(E/F_yc) = 6.08451 ft
L_r := π*r_t*sqrt(E/F_yr) = 22.8469 ft
# Elastic lateral-torsional buckling stress as a function of unbraced length, L_b
F_cr(L_b) := min(C_b*R_b*π^2*E/(L_b/r_t)^2, F_yc)
# Local Buckling Resistance
F_nc_LB :=
    if λ_f ≤ λ_pf
        R_b*R_h*F_yc
    else
        (1 - (1 - F_yr/(R_h*F_yc))*((λ_f - λ_pf)/(λ_rf - λ_pf)))*R_b*R_h*F_yc
F_nc_LB = 50 ksi
# Lateral-Torsional Buckling Resistance
F_nc_LTB(L_b) :=
    if L_b ≤ L_p
        R_b*R_h*F_yc
    else
        if L_b ≤ L_r
            min(C_b*(1 - (1 - F_yr/(R_h*F_yc))*((L_b - L_p)/(L_r - L_p)))*R_b*R_h*F_yc, R_b*R_h*F_yc)
        else
            min(F_cr(L_b), R_b*R_h*F_yc)
# Tension Flange Yielding (per AASHTO 6.10.8.3)
F_nt := R_h*F_yt = 50 ksi
# Summary of Nominal Flexural Resistance
# [Excel component]
    excel["Sheet1!C1"] := L_p/ft
    excel["Sheet1!C6"] := F_nc_LTB(L_p)/ksi
    excel["Sheet1!C2"] := L_r/ft
    excel["Sheet1!C7"] := F_nc_LTB(L_r)/ksi
    excel["Sheet1!C3"] := F_crw/ksi
    excel["Sheet1!C8"] := F_nc_LTB(50 ft)/ksi
    excel["Sheet1!C4"] := F_nc_LB/ksi
    excel["Sheet1!C5"] := F_nt/ksi
Lb := 0 ft, .5 ft .. 200 ft
FncLTB(Lb) :=
    if Lb ≤ L_p
        R_b*R_h*F_yc
    else
        if Lb ≤ L_r
            min(C_b*(1 - (1 - F_yr/(R_h*F_yc))*((Lb - L_p)/(L_r - L_p)))*R_b*R_h*F_yc, R_b*R_h*F_yc)
        else
            Fcr ← min(C_b*R_b*π^2*E/(Lb/r_t)^2, F_yc)
            min(Fcr, R_b*R_h*F_yc)
Fgov(Lb) := min(F_crw, F_nc_LB, FncLTB(Lb))
# [chart]
    X[1] := Lb
    Y[1] := F_crw/ksi
    X[2] := Lb
    Y[2] := F_nc_LB/ksi
    X[3] := Lb
    Y[3] := FncLTB(Lb)/ksi
    X[4] := Lb
    Y[4] := Fgov(Lb)/ksi
    Xmin := 0
    Ymax := max(F_y_top, F_y_w, F_y_bottom)/ksi
    Xmax := 100
    Ymin := 0
