# Analysis Description
# Analyze each of the six girder splice locations at all phases of construction to determine the minimum number of snug-tightened bolts that must be installed to maintain girder stability and load path continuity.
# Methodology
# These analyses are in accordance with the Load and Resistance Factor (LRFD) methodology.  Because the girders were modeled as 2-node 3D frame finite elements with six degrees of freedom per node, the direct forces are extracted from the STAAD.pro output for each erection analysis phase.
#
# Transverse, longitudinal, and vertical forces will be combined additively at the top flange splice, web splice, and bottom flange splice plates.  The maximum force effects from all erection analysis phases are used at each splice location and are superimposed on the section conservatively.  The forces in the critical bolt(s) are superimposed with the following relationships:
# Tension Flange
F_l == F_x/N_b_flange + M_z/(d_h_flanges*N_b_flange) + M_y*d_x/(I_p/A_b)
F_t == F_z/N_b_flange + M_x/(d_h_flanges*N_b_flange) + M_y*d_y/(I_p/A_b)
F_v == 0
# Web
F_l == F_x/N_b_web + H_w/N_b_web
F_t == 0
F_v == F_y/N_b_web
# Additionally, the web bolts must resist a horizontal force component of the flange moment, assuming the flange is incapable of providing adequate flexural resistance beyond the resistance provided by the flange splice bolts:
H_w == (ϕM_n - M_z)/(D_w/4)  # Ref:  AASHTO Figure C6.13.6.1.3c-2
# where:
# F_l = Resultant longitudinal force in web or flange (kip), positive
# F_t = Resultant transverse force in flange (kip), positive
# F_v = Resultant vertical force in web (kip), positive
# N_b_flange, N_b_web = Number snug-tightened bolts in web or flange
# d_h_flanges = Distance between the respective centroids of the top and bottom flanges (ft)
# d_x, d_y = Distance to critical bolt from center of bolt pattern, (in)
# I_p = Polar moment of inertia for bolt group (in^4)
# A_b = Area of bolt (in^2)
# D_w = Web depth, equal for all girders, (in)
# ϕM_n = Calculated major-axis bending strength at phase (kip-ft)
# H_w = Horizontal force component of major axis moment carried by the web splice bolts (kip)
# F_x, F_y, F_z = Beam end forces at splice (kip), positive
# M_x, M_y, M_z = Beam end moments at splice (kip-ft), positive
