# Analysis Description
# Check the adequacy of the bolted splice connection for Splice #1, connecting Girders A and B, during all phases of erection.  The bolts will be snug-tightened until the bridge steel is fully erected.
# Summary of Tabulated Splice Forces During Erection
# [Excel component]
    excel["Sheet1!A1"] :=
        input ← READEXCEL(".\Splice Analysis Data.xlsx", "Summary!A1:S44")
        input
    [F_x; F_y; F_z] := excel["Sheet1!r3:r5"]*kip
    [M_x; M_y; M_z] := excel["Sheet1!r6:r8"]*kip*ft
    d_h_flanges := excel["Sheet1!r9"]*ft
# Table 1:  Governing beam-end forces at Splice 1 for all erection analysis phases
# Bolt Resistance
ϕ_s := 0.80  # Number of shear planes, N_s := 2
ϕ_bb := 0.80
F_ub := 120 ksi
d_b := 0.875 in
A_b := π/4*d_b^2 = 0.60132 in^2
d_h := 0.9375 in
# Shear Resistance
# Use a reduced capacity for a snug-tightened bolt
R_nv := ϕ_s*36 ksi*A_b*N_s = 34.6361 kip
# Flange Splice Plate
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# Number of rows (symmetric about CL Flange), n_r := 2
# Number of columns (symmetric about one side of plate), n_c := 4
# Total Number of bolts on one side of splice in flange, N_b_flg_tot := 2*n_r*n_c = 16
# Vertical bolt spacing, s_y := 4 in
# Horizontal bolt spacing, s_x := 9 in in effective bolt group
# Flange CL to topmost bolt, d_y := 7 in
# Bolt group vert CL to leftmost bolt, d_x := 4.5 in
# Figure 1:  Flange Splice Dimensions with Indicated Minimum Bolts
# Assume All Bolts Snug Tightened
# Number of effective bolts per row, n_bpr := 2
# Number of effective rows, n_er := 2
# Total Number of effective bolts in splice, N_b_flg := 2*n_bpr*n_er = 8
# Polar Moment of Bolt Group
I_p :=
    sumix ← 0
    sumiy ← 0
    for i ∈ 1 .. n_er
        y ← d_y - (i - 1)*s_y
        sumix ← sumix + 2*n_bpr*y^2
    for j ∈ 1 .. n_bpr/2
        x ← d_x - (j - 1)*s_x
        sumiy ← sumiy + 2*2*n_er*x^2
    A_b*(sumix + sumiy)
    = 236.92 in^4
# Superimposed Longitudinal Forces in Critical Bolt
F_l_flg := F_x/N_b_flg + M_z/(d_h_flanges*N_b_flg) + M_y*d_y/(I_p/A_b) = 26.5459 kip
# Superimposed Transverse Forces in Critical Bolt
F_t_flg := F_z/N_b_flg + M_x/(d_h_flanges*N_b_flg) + M_y*d_x/(I_p/A_b) = 15.1265 kip
# Total Force in Critical Bolt
F_u_t := sqrt(F_l_flg^2 + F_t_flg^2) = 30.5532 kip
# Utilization
util_flange := F_u_t/R_nv = 0.88212
# Note:  The above calculation presents the minimum number of bolts to safely carry the design forces in the event of extreme time restrictions during erection.  It is common HSE practice to require all flange bolts to be snug tightened.
# Web Splice
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# Vertical distance from center of bolt group to outermost bolt, d_y := 2.5 ft
# Horizontal distance from center of bolt group to outermost bolt, d_x := 4.5 in
# Vertical spacing of bolts, s_y := 3.75 in
# Horizontal spacing of bolts, s_x := 3 in
# Depth of web (all girders uniform), D_w := 74 in
# Thickness of web (all girders uniform), t_w := 0.5 in
# Major axis bending strength and Factored Major Axis Bending Moment from Phased Construction Analysis - Phase 13 critical phase
ϕM_zn := 2258 kip*ft
M_z = 204.161 kip*ft
# Figure 2:  Web Splice Dimensions
# Horizontal Component of Net Flange Moment Strength
M_w := ϕM_zn - M_z = 2053.84 kip*ft
H_w := M_w/(D_w/4) = 1332.22 kip
# Splice Strength - Bolt the Topmost and Bottommost Number of Rows Indicated Below w/ All Bolts in the Row
# Number of bolt rows symmetric about bolt group CL, n_rows := 5
# Number of bolts per row, n_bpr := 4
# Total Number of bolts in the web, N_b_web := n_rows*2*n_bpr = 40
# Superimposed Horizontal Force in Critical Bolt
F_l := F_x/N_b_web + H_w/N_b_web = 33.3213 kip
# Total Force in Critical Bolt
# In accordance with AASHTO C6.13.6.1.3c, the resultant web force is assumed divided equally to all bolts.
R_u := sqrt(F_l^2 + (F_y/N_b_web)^2) = 33.3242 kip
# Utilization
util_web := R_u/R_nv = 0.962124
