# Problem Statement
# Determine the design wind pressures and equivalent uniformly distributed loads applied to the girders for active construction conditions and inactive construction conditions.
# References
# - "Guide Specifications for Wind Loads on Bridges During Construction," AASHTO, 2017 Edition
# - ASCE 7 Online Hazard Tool (https://asce7hazardtool.online/)
# Methodology and Assumptions
# - The maximum design wind speed for active construction conditions is V_active := 20 mph.
# - The design 3-second wind gust speed is determined from the ASCE Online Hazard Tool considering Fredericksburg, VA, as the location and ASCE Risk Category II.
# - An additional uniform pressure of P_road := 5 psf is applied to Girders C through E for inactive conditions to account for air pressure generated by live traffic.
# - Steel erection is expected to be completed in less than six weeks; therefore, appropriate factors are considered in the subsequent calculations.  Stability of the bridge after the erectors have completed work is the responsibility of the General Contractor.
# Parameters to Determine Design Wind Pressures
# Wind Exposure Category
wind_exposure_category := "C"  # Ref:  AASHTO 4.1.5
# Wind Speed Reduction Factor (Inactive)
R_inactive := 0.65  # list choice: 0-6 weeks = 0.65, 6 weeks - 1 year = 0.73, 1 - 2 years = 0.75, 2 - 3 years = 0.77, 3 - 7 years = 0.84
# Ref:  AASHTO Table 4.2.1-1
R_inactive = 0.65
R_active := 1.0
# Beam Spacing (Radial) & Number of Girder Lines
S := 9 ft + 10 in
N_g := 4
# Reference Ground Elevations
# [Excel component]
    zref_AA := excel["Sheet1!D2"]*ft
    zref_P1 := excel["Sheet1!D3"]*ft
    zref_P2 := excel["Sheet1!D4"]*ft
    zref_P3 := excel["Sheet1!D5"]*ft
    zref_AB := excel["Sheet1!D6"]*ft
# Table 1: Reference ground elevation locations and elevations
# Bottom of Bottom Flange Elevations | Ref:  Shop drawing E201
# Select the higher elevation of girder lines 1/2 and 3/4
# [Excel component]
    [zbbf_AA_1; zbbf_P1_1; zbbf_P2_1; zbbf_P3_1; zbbf_AB_1] := excel["Sheet1!D3:D7"]*ft
    [zbbf_AA_3; zbbf_P1_3; zbbf_P2_3; zbbf_P3_3; zbbf_AB_3] := excel["Sheet1!G3:G7"]*ft
# Table 2:  Reference governing bottom of bottom flange elevations
# Base Drag Coefficient for Girders
C_D_base := 2.2  # list choice: Steel Plate Girders = 2.2, Rolled I-Beams = 2.2, Concrete I-beams = 2.0, Closed & Open Box Girders = 2.1, Round Members = 1.0, U-box: D x D/2 = 2.05, U-box: D x D = 1.66, U-box: D x 2D = 1.35, U-box: D x D 4:1 = 1.39
# Ref:  AASHTO Tables 4.2.1-2/3, C4.2.1-3
C_D_base = 2.2
# Gust Effect Factor
G := 1.0  # Ref:  AASHTO 4.2.1
# Base Inactive Design Wind Speed
# Note:  the "actual" wind speed used for comparison of weather forecasts is the base design wind speed multiplied by the wind speed reduction factor.  Wind speeds may be reduced if stability or safety conditions warrant the reduction.
V_inactive := 112 mph  # Ref:  ASCE Hazard Tool Online
# Weighted Average Girder Depths and Spacing/Depth Ratios
# For girders with multiple sections (B, D, and F girders), a weighted average is used to determine a uniform depth.
# [Excel component]
    excel["Sheet1!C1"] := S/in
    d_1A := excel["Sheet1!E4"] in
    d_3A := excel["Sheet1!F5"] in
    d_1B := excel["Sheet1!F6"] in
    d_3B := excel["Sheet1!F9"] in
    d_1C := excel["Sheet1!F12"] in
    d_3C := excel["Sheet1!F13"] in
    d_1D := excel["Sheet1!F14"] in
    d_3D := excel["Sheet1!F17"] in
    d_1E := excel["Sheet1!F20"] in
    d_3E := excel["Sheet1!F21"] in
    d_1F := excel["Sheet1!F22"] in
    d_3F := excel["Sheet1!F25"] in
    d_1G := excel["Sheet1!F28"] in
    d_3G := excel["Sheet1!F29"] in
    ds_vector := excel["Sheet1!G4:G29"]
    sd_avg := excel["Sheet1!G37"]
# Table 3:  Weighted girder depths and Spacing / Depth ratios
# Design Structure Heights
# [Excel component]
    excel["Sheet1!B5:B18"] := [
        zbbf_AA_1;
        zbbf_AA_3;
        zbbf_AA_1;
        zbbf_AA_3;
        zbbf_P1_1;
        zbbf_P1_3;
        zbbf_P1_1;
        zbbf_P1_3;
        zbbf_P2_1;
        zbbf_P2_3;
        zbbf_P2_1;
        zbbf_P2_3;
        zbbf_P3_1;
        zbbf_P3_3
    ]/ft
    excel["Sheet1!E5:E18"] := [
        zbbf_P1_1;
        zbbf_P1_3;
        zbbf_P1_1;
        zbbf_P1_3;
        zbbf_P2_1;
        zbbf_P2_3;
        zbbf_P2_1;
        zbbf_P2_3;
        zbbf_P3_1;
        zbbf_P3_3;
        zbbf_P3_1;
        zbbf_P3_3;
        zbbf_AB_1;
        zbbf_AB_3
    ]/ft
    excel["Sheet1!H5:H18"] := [0; 0; zbbf_P2_1; zbbf_P2_3; 0; 0; zbbf_P3_1; zbbf_P3_3; 0; 0; zbbf_AB_1; zbbf_AB_3; 0; 0]/ft
    excel["Sheet1!C5:C18"] := [
        zref_AA;
        zref_AA;
        zref_AA;
        zref_AA;
        zref_P1;
        zref_P1;
        zref_P1;
        zref_P1;
        zref_P2;
        zref_P2;
        zref_P2;
        zref_P2;
        zref_P3;
        zref_P3
    ]/ft
    excel["Sheet1!F5:F18"] := [
        zref_P1;
        zref_P1;
        zref_P1;
        zref_P1;
        zref_P2;
        zref_P2;
        zref_P2;
        zref_P2;
        zref_P3;
        zref_P3;
        zref_P3;
        zref_P3;
        zref_AB;
        zref_AB
    ]/ft
    excel["Sheet1!I5:I18"] := [0; 0; zref_P2; zref_P2; 0; 0; zref_P3; zref_P3; 0; 0; zref_AB; zref_AB; 0; 0]/ft
    excel["Sheet1!L5:L18"] := [d_1A; d_3A; d_1B; d_3B; d_1C; d_3C; d_1D; d_3D; d_1E; d_3E; d_1F; d_3F; d_1G; d_3G]/ft
    [z_A_1; z_A_3; z_B_1; z_B_3; z_C_1; z_C_3; z_D_1; z_D_3; z_E_1; z_E_3; z_F_1; z_F_3; z_G_1; z_G_3] := excel["Sheet1!M5:M18"]*ft
# Table 4: Design heights for computation of Kz
# Pressure Exposure and Elevation Coefficient
# This parameter is a function of the design elevation (z in feet) and is dependent on the wind exposure category.
K_z(z) :=
    z ← z/ft
    if wind_exposure_category == "B"
        max(0.71, (2.5*ln(z/0.9834) + 6.87)^2/345.6)
    else if wind_exposure_category == "C"
        max(1.0, (2.5*ln(z/0.0984) + 7.35)^2/478.4)
    else
        max(1.15, (2.5*ln(z/0.0164) + 7.65)^2/616.1)  # Ref:  AASHTO Eq. 4.2.1-2 thru 4.2.1-4
K_z_A1 := K_z(z_A_1) = 1.05546
K_z_A3 := K_z(z_A_3) = 1.06154
K_z_B1 := K_z(z_B_1) = 1.05617
K_z_B3 := K_z(z_B_3) = 1.0623
K_z_C1 := K_z(z_C_1) = 1.05564
K_z_C3 := K_z(z_C_3) = 1.06172
K_z_D1 := K_z(z_D_1) = 1.05652
K_z_D3 := K_z(z_D_3) = 1.06246
K_z_E1 := K_z(z_E_1) = 1.03588
K_z_E3 := K_z(z_E_3) = 1.03288
K_z_F1 := K_z(z_F_1) = 1.04092
K_z_F3 := K_z(z_F_3) = 1.03468
K_z_G1 := K_z(z_G_1) = 1.04033
K_z_G3 := K_z(z_G_3) = 1.03404
[C_D1; C_D2; C_D3; C_D4; C_D5; C_D6] :=
    if sd_avg ≤ 3
        return [C_D_base; 0; 0.25*C_D_base; 0.25*C_D_base; 0.25*C_D_base; 0.5*C_D_base]
    else
        return [C_D_base; 0; 0.5*C_D_base; 0.5*C_D_base; 0.5*C_D_base; 0.5*C_D_base]
# Drag Coefficients for Individual Girder Positions
# Number of girder lines, N_g = 4 | Ref:  AASHTO Figure C4.2.1-1
# Average spacing / depth ratio, sd_avg = 1.54341
C_D1 = 2.2
C_D2 = 0
C_D3 = 0.55
C_D4 = 0.55
# Computer Girder Base Wind Pressures and Uniformly Distributed Loads
# General Equation for Wind Pressure
P_z(V, K_z, C_D, R) := 2.56*10^-6*(V/mph)^2*R^2*K_z*G*C_D*ksf  # Ref:  AASHTO Eq. 4.2.1-1
# Computation of A Girders (all others similar)
# Active Work Zone For V_active = 20 mph
P_A_active := P_z(V_active, max(K_z_A1, K_z_A3), [C_D1; C_D2; C_D3; C_D4], R_active) = [0.00239144; 0; 0.000597861; 0.000597861] ksf
w_A_active := P_A_active*max(d_1A, d_3A) = [0.015096; 0; 0.003774; 0.003774] kip/ft
# Inactive Work Zone For V_inactive = 112 mph
P_A_inactive := P_z(V_inactive, max(K_z_A1, K_z_A3), [C_D1; C_D2; C_D3; C_D4], R_inactive) = [0.0316857; 0; 0.00792142; 0.00792142] ksf
w_A_inactive := P_A_inactive*max(d_1A, d_3A) = [0.200016; 0; 0.050004; 0.050004] kip/ft
# Restricted Wind Loading (Spans C and D - See Phased Construction Analysis) For V_res := 65 mph
P_A_res := P_z(V_res, max(K_z_A1, K_z_A3), [C_D1; C_D2; C_D3; C_D4], 1.0) = [0.0252596; 0; 0.00631491; 0.00631491] ksf
w_A_res := P_A_res*max(d_1A, d_3A) = [0.159451; 0; 0.0398629; 0.0398629] kip/ft
# B Girders
# Active Work Zone For V_active = 20 mph
P_B_active := P_z(V_active, max(K_z_B1, K_z_B3), [C_D1; C_D2; C_D3; C_D4], R_active) = [0.00239315; 0; 0.000598289; 0.000598289] ksf
w_B_active := P_B_active*max(d_1B, d_3B) = [0.0154371; 0; 0.00385927; 0.00385927] kip/ft
# Inactive Work Zone For V_inactive = 112 mph
P_B_inactive := P_z(V_inactive, max(K_z_B1, K_z_B3), [C_D1; C_D2; C_D3; C_D4], R_inactive) = [0.0317083; 0; 0.00792709; 0.00792709] ksf
w_B_inactive := P_B_inactive*max(d_1B, d_3B) = [0.204535; 0; 0.0511338; 0.0511338] kip/ft
# Restricted Wind Loading (Spans C and D - See Phased Construction Analysis) For V_res := 65 mph
P_B_res := P_z(V_res, max(K_z_B1, K_z_B3), [C_D1; C_D2; C_D3; C_D4], 1.0) = [0.0252777; 0; 0.00631942; 0.00631942] ksf
w_B_res := P_B_res*max(d_1B, d_3B) = [0.163054; 0; 0.0407636; 0.0407636] kip/ft
# C Girders
# Active Work Zone For V_active = 20 mph
P_C_active := P_z(V_active, max(K_z_C1, K_z_C3), [C_D1; C_D2; C_D3; C_D4], R_active) = [0.00239183; 0; 0.000597958; 0.000597958] ksf
w_C_active := P_C_active*max(d_1C, d_3C) = [0.0151732; 0; 0.0037933; 0.0037933] kip/ft
# Inactive Work Zone For V_inactive = 112 mph
P_C_inactive := P_z(V_inactive, max(K_z_C1, K_z_C3), [C_D1; C_D2; C_D3; C_D4], R_inactive) + [P_road; 0; P_road; P_road] = [0.0366908; 0; 0.0129227; 0.0129227] ksf
w_C_inactive := P_C_inactive*max(d_1C, d_3C) = [0.232757; 0; 0.0819784; 0.0819784] kip/ft
# Restricted Wind Loading (Spans C and D - See Phased Construction Analysis) For V_res := 65 mph
P_C_res := P_z(V_res, max(K_z_C1, K_z_C3), [C_D1; C_D2; C_D3; C_D4], 1.0) = [0.0252637; 0; 0.00631593; 0.00631593] ksf
w_C_res := P_C_res*max(d_1C, d_3C) = [0.160267; 0; 0.0400667; 0.0400667] kip/ft
# D Girders
# Active Work Zone For V_active = 20 mph
P_D_active := P_z(V_active, max(K_z_D1, K_z_D3), [C_D1; C_D2; C_D3; C_D4], R_active) = [0.00239351; 0; 0.000598377; 0.000598377] ksf
w_D_active := P_D_active*max(d_1D, d_3D) = [0.0155079; 0; 0.00387699; 0.00387699] kip/ft
# Inactive Work Zone For V_inactive = 112 mph
P_D_inactive := P_z(V_inactive, max(K_z_D1, K_z_D3), [C_D1; C_D2; C_D3; C_D4], R_inactive) + [P_road; 0; P_road; P_road] = [0.036713; 0; 0.0129283; 0.0129283] ksf
w_D_inactive := P_D_inactive*max(d_1D, d_3D) = [0.23787; 0; 0.0837644; 0.0837644] kip/ft
# Restricted Wind Loading (Spans C and D - See Phased Construction Analysis) For V_res := 65 mph
P_D_res := P_z(V_res, max(K_z_D1, K_z_D3), [C_D1; C_D2; C_D3; C_D4], 1.0) = [0.0252814; 0; 0.00632036; 0.00632036] ksf
w_D_res := P_D_res*max(d_1D, d_3D) = [0.163803; 0; 0.0409507; 0.0409507] kip/ft
# E Girders
# Active Work Zone For V_active = 20 mph
P_E_active := P_z(V_active, max(K_z_E1, K_z_E3), [C_D1; C_D2; C_D3; C_D4], R_active) = [0.00233364; 0; 0.00058341; 0.00058341] ksf
w_E_active := P_E_active*max(d_1E, d_3E) = [0.0148283; 0; 0.00370708; 0.00370708] kip/ft
# Inactive Work Zone For V_inactive = 112 mph
P_E_inactive := P_z(V_inactive, max(K_z_E1, K_z_E3), [C_D1; C_D2; C_D3; C_D4], R_inactive) + [P_road; 0; P_road; P_road] = [0.0359198; 0; 0.0127299; 0.0127299] ksf
w_E_inactive := P_E_inactive*max(d_1E, d_3E) = [0.22824; 0; 0.0808882; 0.0808882] kip/ft
# Restricted Wind Loading (Spans C and D - See Phased Construction Analysis) For V_res := 65 mph
P_E_res := P_z(V_res, max(K_z_E1, K_z_E3), [C_D1; C_D2; C_D3; C_D4], 1.0) = [0.0246491; 0; 0.00616227; 0.00616227] ksf
w_E_res := P_E_res*max(d_1E, d_3E) = [0.156624; 0; 0.0391561; 0.0391561] kip/ft
# F Girders
# Active Work Zone For V_active = 20 mph
P_F_active := P_z(V_active, max(K_z_F1, K_z_F3), [C_D1; C_D2; C_D3; C_D4], R_active) = [0.00234499; 0; 0.000586248; 0.000586248] ksf
w_F_active := P_F_active*max(d_1F, d_3F) = [0.0150592; 0; 0.00376481; 0.00376481] kip/ft
# Inactive Work Zone For V_inactive = 112 mph
P_F_inactive := P_z(V_inactive, max(K_z_F1, K_z_F3), [C_D1; C_D2; C_D3; C_D4], R_inactive) = [0.0310702; 0; 0.00776755; 0.00776755] ksf
w_F_inactive := P_F_inactive*max(d_1F, d_3F) = [0.199529; 0; 0.0498822; 0.0498822] kip/ft
# Restricted Wind Loading (Spans C and D - See Phased Construction Analysis) For V_res := 65 mph
P_F_res := P_z(V_res, max(K_z_F1, K_z_F3), [C_D1; C_D2; C_D3; C_D4], 1.0) = [0.024769; 0; 0.00619224; 0.00619224] ksf
w_F_res := P_F_res*max(d_1F, d_3F) = [0.159063; 0; 0.0397658; 0.0397658] kip/ft
# G Girders
# Active Work Zone For V_active = 20 mph
P_G_active := P_z(V_active, max(K_z_G1, K_z_G3), [C_D1; C_D2; C_D3; C_D4], R_active) = [0.00234366; 0; 0.000585915; 0.000585915] ksf
w_G_active := P_G_active*max(d_1G, d_3G) = [0.0148188; 0; 0.00370469; 0.00370469] kip/ft
P_G_inactive := P_z(V_inactive, max(K_z_G1, K_z_G3), [C_D1; C_D2; C_D3; C_D4], R_inactive) = [0.0310526; 0; 0.00776314; 0.00776314] ksf
w_G_inactive := P_G_inactive*max(d_1G, d_3G) = [0.196343; 0; 0.0490857; 0.0490857] kip/ft
# Restricted Wind Loading (Spans C and D - See Phased Construction Analysis) For V_res := 65 mph
P_G_res := P_z(V_res, max(K_z_G1, K_z_G3), [C_D1; C_D2; C_D3; C_D4], 1.0) = [0.0247549; 0; 0.00618873; 0.00618873] ksf
w_G_res := P_G_res*max(d_1G, d_3G) = [0.156523; 0; 0.0391308; 0.0391308] kip/ft
# Summary
# [Excel component]
    excel["Sheet1!A3:A10"] := concat("Active (V = ", num2str(V_active/mph), " mph)")
    excel["Sheet1!A12:A19"] := concat("Inactive (V = ", num2str(V_inactive/mph), " mph)")
    excel["Sheet1!A21:A28"] := concat("Inactive (V = ", num2str(V_res/mph), " mph)")
    excel["Sheet1!C3:I6"] := augment(P_A_active, P_B_active, P_C_active, P_D_active, P_E_active, P_F_active, P_G_active)/ksf
    excel["Sheet1!C7:I10"] := augment(w_A_active, w_B_active, w_C_active, w_D_active, w_E_active, w_F_active, w_G_active)/(kip/ft)
    excel["Sheet1!C12:I15"] := augment(P_A_inactive, P_B_inactive, P_C_inactive, P_D_inactive, P_E_inactive, P_F_inactive, P_G_inactive)/ksf
    excel["Sheet1!C16:I19"] := augment(w_A_inactive, w_B_inactive, w_C_inactive, w_D_inactive, w_E_inactive, w_F_inactive, w_G_inactive)/(kip/ft)
    excel["Sheet1!C21:I24"] := augment(P_A_res, P_B_res, P_C_res, P_D_res, P_E_res, P_F_res, P_G_res)/ksf
    excel["Sheet1!C25:I28"] := augment(w_A_res, w_B_res, w_C_res, w_D_res, w_E_res, w_F_res, w_G_res)/(kip/ft)
# Table 5:  Summary of active, inactive, and restricted inactive girder pressures and uniformly distributed loads
