# Problem Statement
# In the indicated locations on the Erection Drawings for the subject bridge, temporary anchors for girder tie-downs must be installed.  Determine the anchorage and connection elements required to provide the necessary restraining forces.
# Methodology
# Design of structural elements is in accordance with the Load and Resistance Factor Design (LRFD) Methodology.  Certain elements will be checked in Allowable Strength Design (ASD) if product data information is given as such.
# References
# - ACI 318-14
# - AISC 360, "Steel Construction Manual," 15th Edition, 2017
# Conceptual Layout
# The following schematic represents the design intention for a post-installed girder tie-down anchorage system.
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w := 5 ft
# Girder G3D @ Pier 2
h_left_G3D := 6.5 ft
h_right_G3D := 7 ft + 4 in
b_f_G3D := 24 in
θ_left_G3D := atan(h_left_G3D/(w - b_f_G3D/2)) = 58.3925 deg
θ_right_G3D := atan(h_right_G3D/(w - b_f_G3D/2)) = 61.3895 deg
# Girder G3B @ Pier 1
h_left_G3B := 6 ft
h_right_G3B := 7 ft + 3.5 in
b_f_G3B := 24 in
θ_left_G3B := atan(h_left_G3B/(w - b_f_G3B/2)) = 56.3099 deg
θ_right_G3B := atan(h_right_G3B/(w - b_f_G3B/2)) = 61.2521 deg
# Design Anchor and Tie-Down Forces
# Case 1:  Man Safety -- 2% DL x Web Layover + Worker/Equipment
# Ref:  Temporary Tie-Down Design Calculations
M_u_P2_Case1 := 1.383 kip*ft
M_u_P1_Case1 := 1.249 kip*ft
# Case 2:  Active Wind Load on Girder During Construction
# Ref:  Phased Construction Analysis 05 (for Pier 2) and 09 (for Pier 1)
M_u_P2_Case2 := 13.9 kip*ft
M_u_P1_Case2 := 11.8 kip*ft
# By inspection, Case 2 Governs
# The tie-downs are tension-only members.  Determine the governing vertical (anchor tension) and horizontal (anchor shear) component forces from the tension in the tie-downs.
T_x_P2_left := M_u_P2_Case2/h_left_G3D = 2.13846 kip
T_x_P2_right := M_u_P2_Case2/h_right_G3D = 1.89545 kip
T_x_P1_left := M_u_P1_Case2/h_left_G3B = 1.96667 kip
T_x_P1_right := M_u_P1_Case2/h_right_G3B = 1.61829 kip
T_y_P2_left := T_x_P2_left*tan(θ_left_G3D) = 3.475 kip
T_y_P2_right := T_x_P2_right*tan(θ_right_G3D) = 3.475 kip
T_y_P1_left := T_x_P1_left*tan(θ_left_G3B) = 2.95 kip
T_y_P1_right := T_x_P1_right*tan(θ_right_G3B) = 2.95 kip
# Governing vertical component (anchor tension)
P_u := max(T_y_P2_left, T_y_P2_right, T_y_P1_left, T_y_P1_right) = 3.475 kip
# Governing horizontal component (anchor shear)
V_u := max(T_x_P2_left, T_x_P2_right, T_x_P1_left, T_x_P1_right) = 2.13846 kip
# Governing tension in tie-down
T_u := sqrt(P_u^2 + V_u^2) = 4.08027 kip
# Anchor Design
# The anchor design software TruSpec Anchor Calculation Software by Red Head Concrete Anchoring and Reinforcing Solutions is used to determine the type and size anchor bolts required.
# Program Assumptions/Options:
# - 12" spacing from anchor to face of pier (in direction of the girder)
# - ∞ spacing laterally
# - Condition A shear and tension
# - No base plate (0" thickness entered in the program)
# - 3000 psi, uncracked concrete at the Pier
# - 108" Concrete thickness
# - Design forces (assume 66.6%/33.3% load distribution to anchors
# N_uz := P_u*0.666 = 2314.35 lbf
# V_ux := V_u*0.666 = 1424.22 lbf
# Select Red Head Trubolt Wedge Anchor 3/4" Ø x 5" or equivalent
# Check Capacity of Come-Along
# Resistance factor for rupture, ϕ_t := 0.75
# Capacity of 6-ton come-along, ϕT_n := ϕ_t*6 tonf = 9 kip
# Factor of safety, FS_ca := ϕT_n/T_u = 2.20573
