# [Excel component]
    P_nx := excel["Output!A2:ALN2"]*kip
    f'_c := excel["Output!B12"]*ksi
    f_y := excel["Output!B13"]*ksi
    P_ny := excel["Output!A3:ALN3"]*kip
    b := excel["Output!B14"]*in
    P_ax := excel["Output!A4:ALN4"]*kip
    h := excel["Output!B15"]*in
    P_ay := excel["Output!A5:ALN5"]*kip
    d_B := excel["Output!B16"]*in
    M_nx := excel["Output!A6:ALN6"]*kip*ft
    d_s := excel["Output!B17"]*in
    M_ny := excel["Output!A7:ALN7"]*kip*ft
    ε_c := excel["Output!B18"]
    M_ax := excel["Output!A8:ALN8"]*kip*ft
    rebar_layout := excel["Output!A25:B26"]
    M_ay := excel["Output!A9:ALN9"]*kip*ft
# Overview
# The allowable strengths are first calculated in accordance with the Load and Resistance Factor Design (LRFD) methodology as outlined in ACI 318-19, then converted to equivalent Allowable Strength Design (ASD) values with the following expressions:  Ω == 1.5/ϕ → P_n/Ω == ϕP_n/1.5 and M_n/Ω == ϕM_n/1.5.
# Input
# Design compressive strength of concrete
f'_c = 0 ksi
# Width of the column (x direction)
b = 0 in
# Depth of the column (y direction)
h = 0 in
# Design yield strength of reinforcement
f_y = 0 ksi
# Distance from outer edge to centroid reinforcement
d_s = 0 in
# Rebar layout pattern
rebar_layout = [0, 0; 0, 0]
# Rebar diameter
d_B = 0 in
# Constants
# Maximum strain at the extreme concrete compression fiber
ε_c = 0
# Compressive stress block effective depth parameter
β_1 :=
    if f'_c ≤ 4000 psi
        0.85
    else if f'_c < 8000 psi
        0.85 - 0.05*(f'_c/psi - 4000)/1000
    else
        0.65
    = 0.85
# Young's Modulus of steel
E := 29000 ksi
# Tensile yield strain of steel
ε_y := f_y/E = 0
# [chart]
    X[1] := M_ax/(kip*ft)
    Y[1] := P_ax/kip
    X[2] := M_ay/(kip*ft)
    Y[2] := P_ay/kip
    X[3] := M_nx/(kip*ft)
    Y[3] := P_nx/kip
    X[4] := M_ny/(kip*ft)
    Y[4] := P_ny/kip
