# Input
# Design compressive strength of concrete
f'_c := 3.5 ksi
# Width of the column (x direction)
b := 34 in
# Depth of the column (y direction)
h := 34 in
# Design yield strength of reinforcement
f_y := 53.7 ksi
# Distance from outer edge to centroid reinforcement
ds := 2.5 in
# Rebar layout pattern
rebar_layout := [1, 1; 1, 1]
# Rebar diameter
d_B := 1.5 in
# Constants
# Allowable concrete compressive strain
ε_c := 0.003
# Young's Modulus of steel
E := 29000 ksi
# Tensile yield strain of steel
ε_y := f_y/E = 0.00185172
# Key Values (X-X Axis)
# Pure compression (M_a == 0)
P_ax := 1316.52 kip
# Onset of cracking (ε_c_bottom := 0)
P_acrx := 1316.52 kip
M_acrx := 356.72*(kip*ft)
# Balanced strain (ε_c == ε_s)
P_abalx := -227.75 kip
M_abalx := 0*(kip*ft)
# Tension-controlled limit (ε_s == ε_y + 0.003)
P_atlx := -227.75 kip
M_atlx := 0*(kip*ft)
# Pure bending (P_a == 0)
M_ax := 0*(kip*ft)
# Pure tension (P_a < 0, M_a == 0)
P_atx := -227.75 kip
# Key Values (Y-Y Axis)
# Pure compression (M_a == 0)
P_ay := 1316.52 kip
# Onset of cracking (ε_c_bottom := 0)
P_acry := 1316.52 kip
M_acry := 356.72*(kip*ft)
# Balanced strain (ε_c == ε_s)
P_abaly := -227.75 kip
M_abaly := 0*(kip*ft)
# Tension-controlled limit (ε_s == ε_y + 0.003)
P_atly := -227.75 kip
M_atly := 0*(kip*ft)
# Pure bending (P_a == 0)
M_ay := 0*(kip*ft)
# Pure tension (P_a < 0, M_a == 0)
P_aty := -227.75 kip
