# Input
# Yield strength of steel
F_y := 50 ksi
# Tensile strength of steel
F_u := 65 ksi
# Member length
L := 60 in
# Radius of Gyration
r := 1.79 in
# Gross area of member
A_g := 11.0 in^2
# Net area of member
A_n := 10.8 in^2
# Design tension force
P_u := 150 kip
# D1.  Slenderness Limitations
# Suggested slenderness limitation
sl_max := 300
# Calculated member slenderness
sl := L/r = 33.5196
# D3.  Effective Net Area
# Member Case per Table D3.1
case := 1
# Shear Lag Factor
U := 1
# Effective member area
A_e := U*A_n = 10.8 in^2
# D2.  Tensile Strength
# (a) Tensile yielding in the gross section
P_n := F_y*A_g = 550 kip
# For LRFD, ϕ := 0.90 ∴ ϕP_n := ϕ*P_n = 495 kip
# For ASD, Ω := 1.67 ∴  P_n/Ω = 329.341 kip
results := [ϕP_n/kip, ϕP_n/P_u, P_n/Ω/kip, P_n/(Ω*P_u), "D2(a) Tensile Yielding in Gross Section"]
# (b) Tensile rupture in the net section
P_n := F_u*A_e = 702 kip
# For LRFD, ϕ := 0.75 ∴ ϕP_n := ϕ*P_n = 526.5 kip
# For ASD, Ω := 2.00 ∴  P_n/Ω = 351 kip
results :=
    m ← [ϕP_n/kip, ϕP_n/P_u, P_n/Ω/kip, P_n/(Ω*P_u), "D2(b) Tensile rupture in Net Section"]
    stack(results, m)
    = [
        495, 3.3, 329.341, 2.19561, "D2(a) Tensile Yielding in Gross Section";
        526.5, 3.51, 351, 2.34, "D2(b) Tensile rupture in Net Section"
    ]
# D5.  Pin-Connected Members
# Shortest distance from edge of the pin hole to the edge of the member measured parallel to the direction of the force
a := 2 in
# Diameter of pin
d := (7/8) in
# Thickness of plate
t := 0.5 in
# Area on the shear failure path
A_sf := 2*t*(a + d/2) = 2.4375 in^2
# Effective edge distance
b_e := 2*t + 0.63 in = 1.63 in
# (a) Tensile rupture on the net effective area
P_n := F_u*2*t*b_e = 105.95 kip
# For LRFD, ϕ := 0.75 ∴  ϕP_n := ϕ*P_n = 79.4625 kip
# For ASD, Ω := 2.00 ∴  P_n/Ω = 52.975 kip
results :=
    m ← [ϕP_n/kip, ϕP_n/P_u, P_n/Ω/kip, P_n/(Ω*P_u), "D5(a) Pin-Connected, Tensile Rupture"]
    stack(results, m)
    = [
        495, 3.3, 329.341, 2.19561, "D2(a) Tensile Yielding in Gross Section";
        526.5, 3.51, 351, 2.34, "D2(b) Tensile rupture in Net Section";
        79.4625, 0.52975, 52.975, 0.353167, "D5(a) Pin-Connected, Tensile Rupture"
    ]
# (a) Shear rupture on the net effective area
P_n := 0.6*F_u*A_sf = 95.0625 kip
# For LRFD, ϕ := 0.75 ∴  ϕP_n := ϕ*P_n = 71.2969 kip
# For ASD, Ω := 2.00 ∴  P_n/Ω = 47.5312 kip
results :=
    m ← [ϕP_n/kip, ϕP_n/P_u, P_n/Ω/kip, P_n/(Ω*P_u), "D5(b) Pin-Connected, Tensile Rupture"]
    stack(results, m)
    = [
        495, 3.3, 329.341, 2.19561, "D2(a) Tensile Yielding in Gross Section";
        526.5, 3.51, 351, 2.34, "D2(b) Tensile rupture in Net Section";
        79.4625, 0.52975, 52.975, 0.353167, "D5(a) Pin-Connected, Tensile Rupture";
        71.2969, 0.475312, 47.5312, 0.316875, "D5(b) Pin-Connected, Tensile Rupture"
    ]
# Results
# [Excel component]
    excel["Sheet1!A3"] := results
    [lrfd_rating, ϕP_n, lrfd_section; asd_rating, P_a, asd_section] := excel["Results!B1:D2"]
# Governing Tension Strength (LRFD), ϕP_n*kip = 71.2969 kip
# Governing Section (LRFD), lrfd_section = "D5(b) Pin-Connected, Tensile Rupture"
# Capacity / Demand Ratio (LRFD), lrfd_rating = 0.475312
#
# Governing Tension Strength (ASD), P_a*kip = 47.5312 kip
# Governing Section (ASD), asd_section = "D5(b) Pin-Connected, Tensile Rupture"
# Capacity / Demand Ratio (ASD), asd_rating = 0.316875
