# Input
# Design Methodology
method := "LRFD"  # list choice: ASD = "ASD", LRFD = "LRFD"
# Effective length factor (x, y, z)
k := [1.0, 1.0, 1.0]
# Laterally unbraced member length (x, y, z)
L := [25 ft, 25 ft, 25 ft]
# Member radius of gyration (x, y)
r := [5.1 in, 2.8 in]
# Warping Constant
C_w := 1230 in^6
# Gross cross-sectional area of member
A_g := 11.2 in^2
# Coordinates of shear center w.r.t. centroid
[x_0, y_0] := [0 in, 0 in]
# Moment of inertia about local X axis
I_x := 385 in^4
# Axis of symmetry
# Moment of inertia about local Y axis
symmetry := "xy"  # list choice: Single about x axis = "x", Single about y axis = "y", Doubly symmetric = "xy", Unsymmetric = "u" = "xy"
I_y := 26.7 in^4
# Yield strength
# Torsional constant
F_y := 50 ksi
J := 0.798 in^4
# Young's Modulus
E := 29000 ksi
# Shear Modulus
G := 11200 ksi
# Ultimate/design compressive force
P_u := 1.5*75 kip
# E1.  General Provisions
# Resistance factor (LRFD), ϕ := 0.90
# Safety factor (ASD), Ω := 1.67
# [Excel component]
    excel["TableB4.1a Worksheet!X1"] := F_y/ksi
    excel["TableB4.1a Worksheet!X2"] := E/ksi
    λ := excel["TableB4.1a Worksheet!F8"]
    λ_r := excel["TableB4.1a Worksheet!G8"]
    slender := excel["TableB4.1a Worksheet!H8"]
    chapters := excel["Table E1.1 Worksheet!C5:C9"]
    table_E1.1_section := excel["Table E1.1 Worksheet!C1"]
    element_table := excel["TableB4.1a Worksheet!A2:H7"]
# Governing Member slenderness
λ = 48
# Governing Limiting slenderness
λ_r = 35.884
slender = "Y"
# E2.  Effective Length
L_cx := k[0, 0]*L[0, 0] = 25 ft
L_cy := k[0, 1]*L[0, 1] = 25 ft
L_cz := k[0, 2]*L[0, 2] = 25 ft
# E3.  Flexural Buckling of Members without Slender Elements (FB)
# Section Applicable?  chapters[0] = "N"
# Elastic buckling stress,  F_ex := π^2*E/(L_cx/r[0, 0])^2 = 82.7172 ksi  F_ey := π^2*E/(L_cy/r[0, 1])^2 = 24.9328 ksi
# Critical stress, F_crx := if L_cx/r[0, 0] ≤ 4.71*sqrt(E/F_y) (0.658^(F_y/F_ex))*F_y else 0.877*F_ex = 38.8234 ksi  F_cry := if L_cy/r[0, 1] ≤ 4.71*sqrt(E/F_y) (0.658^(F_y/F_ey))*F_y else 0.877*F_ey = 21.5994 ksi
#
# F_cr := min(F_crx, F_cry) = 21.5994 ksi
results := [0, 0, 0, 0, " "]
# For the flexural buckling limit state, P_n := F_cr*A_g = 241.914 kip
# For LRFD, ϕP_n := ϕ*P_n = 217.722 kip
# For ASD, P_n/Ω = 144.858 kip
results :=
    if chapters[0] == "Y" or chapters[0] == "N"
        stack(results, [ϕP_n/kip, ϕP_n/P_u, P_n/Ω/kip, P_n/(Ω*P_u), "E3 - Flexural Buckling"])
    else
        results
    = [0, 0, 0, 0, " "; 217.722, 1.93531, 144.858, 1.28763, "E3 - Flexural Buckling"]
# E4.  Torsional and Flexural-Torsional Buckling of Single Angles and Members Without Slender Elements (TB/FTB)
# Section Applicable:  chapters[1] = "N"
# Polar radius of gyration about shear center
rbar_0 := sqrt(x_0^2 + y_0^2 + (I_x + I_y)/A_g) = 6.06291 in
# Flexural Constant
H := 1 - (x_0^2 + y_0^2)/rbar_0^2 = 1
# Elastic torsional buckling stress
F_ez := (π^2*E*C_w/L_cz^2 + G*J)*1/(A_g*rbar_0^2) = 31.2102 ksi
# Critical Stress
# For singly symmetric (a) and doubly symmetric (b) members twisting about shear center:
F_e_sym :=
    if symmetry == "xy"
        (π^2*E*C_w/L_cz^2 + G*J)*1/(I_x + I_y)
    else if symmetry == "u"
        0
    else
        if symmetry == "x"
            F ← F_ex
        else
            F ← F_ey
        ((F + F_ez)/(2*H))*(1 - sqrt(1 + 4*F*F_ez*H/(F + F_ez)^2))
    = 31.2102 ksi
# For unsymmetric members twisting about shear center:
F_e_unsym := (F - F_ex)*(F - F_ey)*(F - F_ez) - F^2*(F - F_ey)*(x_0/rbar_0)^2 - F^2*(F - F_ex)*(y_0/rbar_0)^2 == 0 solve, F → [82.7171544855*ksi; 31.2102336919*ksi; 24.9328139626*ksi]
F_e_unsym := min(F_e_unsym) = 24.9328 ksi
F_e := if(symmetry == "u", F_e_unsym, F_e_sym) = 31.2102 ksi
# For the limit state, P_n := F_e*A_g = 349.555 kip
# For LRFD, ϕP_n := ϕ*P_n = 314.599 kip
# For ASD, P_n/Ω = 209.314 kip
results :=
    if chapters[0] == "Y" or chapters[0] == "N"
        sec ←
            if symmetry == "xy"
                "E4(a) TB/FTB Doubly symmetric"
            else if symmetry == "u"
                "E4 (c) TB/FTB Unsymmetric"
            else
                "E4 (b) TB/FTB Singly symmetric"
        m ← [ϕP_n/kip, ϕP_n/P_u, P_n/Ω/kip, P_n/(Ω*P_u), sec]
        stack(results, m)
    else
        results
    = [
        0, 0, 0, 0, " ";
        217.722, 1.93531, 144.858, 1.28763, "E3 - Flexural Buckling";
        314.599, 2.79644, 209.314, 1.86057, "E4(a) TB/FTB Doubly symmetric"
    ]
# E5. Single-Angle Compression Members
# Section Applicable:  chapters[2] = "N"
# Nominal compressive strength is lowest value of FB (Section E3 or E7) or FTB (Section E4) if λ > 0.71*sqrt(E/F_y).
# Neglect FTB?  neglect_FTB := λ_rE5 ← 0.71*sqrt(E/F_y) if(λ ≤ λ_rE5, "Y", "N") = "N"
#
# Effects of eccentricity shall be neglected if the following are satisfied (otherwise, evaluate combined axial and bending per Chapter H):
# - Members are loaded at the ends in compression through the same leg
# - Members are attached by welding or by connections with a minimum of two (2) bolts
# - There are no intermediate transverse loads
# - L_c/r ≤ 200  As defined in this section
# - For unequal leg angles, the ratio of long leg width (b_l) to short leg width (b_s) is less than 1.7
# If the above criteria are met, evaluate as axially loaded members with the following values:
#
# Long leg length, b_l := 6 in
# Short leg length, b_s := 4 in
# Ratio of long/short leg lengths, b_l/b_s = 1.5
# Length of member, L_a := max(L) = 25 ft
#
# Connected leg, connected_leg := 1  # list choice: x = 0, y = 1  ∴  r_a := r[0, connected_leg] = 2.8 in
#
# (a) For angles that are individual members or web members or web members of planar trusses w/ adjacent  members attached to the same side of the gusset plate or chord:
#
# (1) Angles connected through the longer leg
# bp := if L_a/r_a ≤ 80 72 + L_a/r_a else 32 + 1.25*L_a/r_a = 165.929
# Flexural Buckling per E3
# Elastic buckling stress, F_e := π^2*E/bp^2 = 10.3957 ksi
# Critical stress, F_cr := if bp ≤ 4.71*sqrt(E/F_y) (0.658^(F_y/F_e))*F_y else 0.877*F_e = 9.11706 ksi
#
# For the flexural buckling limit state, P_n := F_cr*A_g = 102.111 kip
# For LRFD, ϕP_n := ϕ*P_n = 91.9 kip
# For ASD, P_n/Ω = 61.1444 kip
results :=
    if chapters[2] == "Y"
        sec ← "E5(a)(1) - FB"
        m ← [ϕP_n/kip, ϕP_n/P_u, P_n/Ω/kip, P_n/(Ω*P_u), sec]
        stack(results, m)
    else
        results
    = [
        0, 0, 0, 0, " ";
        217.722, 1.93531, 144.858, 1.28763, "E3 - Flexural Buckling";
        314.599, 2.79644, 209.314, 1.86057, "E4(a) TB/FTB Doubly symmetric"
    ]
# (2) Angles connected through the shorter leg
# bp := max(0.95*L_a/r[0, 1], bp + 4*((b_l/b_s)^2 - 1)) = 170.929
# Flexural Buckling per E3
# Elastic buckling stress, F_e := π^2*E/bp^2 = 9.79644 ksi
# Critical stress, F_cr := if bp ≤ 4.71*sqrt(E/F_y) (0.658^(F_y/F_e))*F_y else 0.877*F_e = 8.59148 ksi
#
# For the flexural buckling limit state, P_n := F_cr*A_g = 96.2246 kip
# For LRFD, ϕP_n := ϕ*P_n = 86.6021 kip
# For ASD, P_n/Ω = 57.6195 kip
results :=
    if chapters[2] == "Y"
        sec ← "E5(a)(2) - FB"
        m ← [ϕP_n/kip, ϕP_n/P_u, P_n/Ω/kip, P_n/(Ω*P_u), sec]
        stack(results, m)
    else
        results
    = [
        0, 0, 0, 0, " ";
        217.722, 1.93531, 144.858, 1.28763, "E3 - Flexural Buckling";
        314.599, 2.79644, 209.314, 1.86057, "E4(a) TB/FTB Doubly symmetric"
    ]
# (b) For angles that are individual members or web members or web members of box or space trusses w/ adjacent  members attached to the same side of the gusset plate or chord:
#
# (1) Angles connected through the longer leg
# bp := if L_a/r_a ≤ 75 60 + 0.8*L_a/r_a else 45 + L_a/r_a = 152.143
# Flexural Buckling per E3
# Elastic buckling stress, F_e := π^2*E/bp^2 = 12.365 ksi
# Critical stress, F_cr := if bp ≤ 4.71*sqrt(E/F_y) (0.658^(F_y/F_e))*F_y else 0.877*F_e = 10.8441 ksi
#
# For the flexural buckling limit state, P_n := F_cr*A_g = 121.454 kip
# For LRFD, ϕP_n := ϕ*P_n = 109.309 kip
# For ASD, P_n/Ω = 72.727 kip
results :=
    if chapters[2] == "Y"
        sec ← "E5(b)(1) - FB"
        m ← [ϕP_n/kip, ϕP_n/P_u, P_n/Ω/kip, P_n/(Ω*P_u), sec]
        stack(results, m)
    else
        results
    = [
        0, 0, 0, 0, " ";
        217.722, 1.93531, 144.858, 1.28763, "E3 - Flexural Buckling";
        314.599, 2.79644, 209.314, 1.86057, "E4(a) TB/FTB Doubly symmetric"
    ]
# (2) Angles connected through the shorter leg
# bp := max(0.82*L_a/r[0, 1], bp + 6*((b_l/b_s)^2 - 1)) = 159.643
# Flexural Buckling per E3
# Elastic buckling stress, F_e := π^2*E/bp^2 = 11.2305 ksi
# Critical stress, F_cr := if bp ≤ 4.71*sqrt(E/F_y) (0.658^(F_y/F_e))*F_y else 0.877*F_e = 9.84914 ksi
#
# For the flexural buckling limit state, P_n := F_cr*A_g = 110.31 kip
# For LRFD, ϕP_n := ϕ*P_n = 99.2793 kip
# For ASD, P_n/Ω = 66.0541 kip
results :=
    if chapters[2] == "Y"
        sec ← "E5(b)(2) - FB"
        m ← [ϕP_n/kip, ϕP_n/P_u, P_n/Ω/kip, P_n/(Ω*P_u), sec]
        stack(results, m)
    else
        results
    = [
        0, 0, 0, 0, " ";
        217.722, 1.93531, 144.858, 1.28763, "E3 - Flexural Buckling";
        314.599, 2.79644, 209.314, 1.86057, "E4(a) TB/FTB Doubly symmetric"
    ]
# E6. Built-up Members
# E7. Members with Slender Elements (LB)
# Section Applicable:  chapters[4] = "Y"
# Governing critical bucking stress from Sections E3 and E4
# Governing compression strength, E3 (ASD result used, LRFD identical): P_n_E3 := Ω*results[1, 2]*kip = 241.914 kip
# Governing compression strength, E4 (ASD result used, LRFD identical): P_n_E4 := Ω*results[2, 2]*kip = 349.555 kip
# Governing critical buckling stress, F_cr := min(P_n_E3, P_n_E4)/A_g = 21.5994 ksi
# Tabulation of Effective Cross Section Area
# [Excel component]
    excel["Sheet1!A3"] := element_table
    excel["Sheet1!V2"] := F_y/ksi
    excel["Sheet1!V3"] := E/ksi
    excel["Sheet1!V5"] := A_g/in^2
    excel["Sheet1!V4"] := F_cr/ksi
    ΔA_g := excel["Sheet1!N9"]*in^2
A_e := A_g - ΔA_g = 10.9507 in^2
# For the limit state, P_n := F_cr*A_e = 236.528 kip
# For LRFD, ϕP_n := ϕ*P_n = 212.875 kip
# For ASD, P_n/Ω = 141.633 kip
results :=
    if chapters[4] == "Y"
        sec ← "E7 - FB, TB, FTB interaction w/ LB"
        m ← [ϕP_n/kip, ϕP_n/P_u, P_n/Ω/kip, P_n/(Ω*P_u), sec]
        stack(results, m)
    else
        results
    = [
        0, 0, 0, 0, " ";
        217.722, 1.93531, 144.858, 1.28763, "E3 - Flexural Buckling";
        314.599, 2.79644, 209.314, 1.86057, "E4(a) TB/FTB Doubly symmetric";
        212.875, 1.89222, 141.633, 1.25896, "E7 - FB, TB, FTB interaction w/ LB"
    ]
# Results
# [Excel component]
    excel["Results!A3"] := results[:, 0]
    excel["Results!B3"] := results[:, 2]
    excel["Results!C3"] := results[:, 4]
    excel["Results!P1"] := method
    excel["Results!B14"] := P_u/kip
    [P_a; cdr; code_check] := excel["Results!B15:B17"]
