# [Excel component]
    shape := excel["Sheet1!C1"]
    F_y := excel["Sheet1!C2"]*ksi
    E := excel["Sheet1!C3"]*ksi
    Type := excel["Sheet1!B5"]
    A_g := excel["Sheet1!B6"]*in^2
    d := excel["Sheet1!B7"]*in
    b_f := excel["Sheet1!B8"]*in
    t_f := excel["Sheet1!B9"]*in
    t_w := excel["Sheet1!B10"]*in
    b_2tf := excel["Sheet1!B11"]
    λ_pf := excel["Sheet1!D11"]
    λ_rf := excel["Sheet1!E11"]
    h_tw := excel["Sheet1!B12"]
    λ_pw := excel["Sheet1!D12"]
    λ_rw := excel["Sheet1!E12"]
    I_x := excel["Sheet1!B13"]*in^4
    S_x := excel["Sheet1!B14"]*in^3
    r_x := excel["Sheet1!B15"]*in
    Z_x := excel["Sheet1!B16"]*in^3
    I_y := excel["Sheet1!B17"]*in^4
    S_y := excel["Sheet1!B18"]*in^3
    r_y := excel["Sheet1!B19"]*in
    Z_y := excel["Sheet1!B20"]*in^3
    r_ts := excel["Sheet1!B21"]*in
    h_0 := excel["Sheet1!B22"]*in
    J := excel["Sheet1!B23"]*in^4
    C_w := excel["Sheet1!B24"]*in^6
# Input
# Cross Section
# Section Type  Type = "W"  shape = "W27X129"
# Gross Area  A_g = 37.8 in^2
# Depth  d = 27.6 in
# Compact section criterial  b_2tf = 4.55
# h_tw = 39.7
# Major axis (x-x; notated as z-z axis in STAAD)  I_x = 4760 in^4
# S_x = 345 in^3
# r_x = 11.2 in
# Z_x = 395 in^3
# Minor axis (y-y)  I_y = 184 in^4
# S_y = 36.8 in^3
# r_y = 2.21 in
# Z_y = 37.8 in^3
# Effective radius for LTB  r_ts = 2.66 in
# Distance between centroids of flanges  h_0 = 26.5 in
# St. Venant Torsional Constant  J = 11.1 in^4
# Warping Constant  C_w = 32500 in^6
#
# Material
# Yield strength  F_y = 50 ksi
# Young's Modulus  E = 29000 ksi
# Shear Modulus  G := 11200 ksi
#
# Unbraced Length  L_b := 15 ft
# F1.  General Provisions
# Resistance factor (LRFD), ϕ := 0.90
# Safety factor (ASD), Ω := 1.67
# Lateral-torsional buckling modification factor, C_b := 1.0 (conservatively assumed)
# F2.  Doubly-Symmetric Compact I-Shaped Members and Channels Bent About Their Major Axis
# 1. Yielding
M_p := Z_x*F_y = 1645.83 kip*ft  # ∴ M_n_Y := M_p = 1645.83 kip*ft
# 2.  Lateral-Torsional Buckling
# Limiting laterally unbraced length for yielding, L_p := 1.76*r_y*sqrt(E/F_y) = 7.80616 ft
# Calculation of limiting unbraced length for inelastic LTB
c := if(Type == "C", h_0/2*sqrt(I_y/C_w), 1) = 1
L_r := 1.95*r_ts*E/(0.7*F_y)*sqrt(J*c/(S_x*h_0) + sqrt((J*c/(S_x*h_0))^2 + 6.76*(0.7*F_y/E)^2)) = 24.2347 ft
# Critical Stress, F_cr(Lb) := C_b*π^2*E/(Lb/r_ts)^2*sqrt(1 + 0.078*J*c/(S_x*h_0)*(Lb/r_ts)^2)  ∴  F_cr(L_b) = 74.8405 ksi
M_n_LTB(Lb) :=
    if Lb ≤ L_p
        M_p
    else if Lb ≤ L_r
        min(C_b*(M_p - (M_p - 0.7*F_y*S_x)*((Lb - L_p)/(L_r - L_p))), M_p)
    else
        min(F_cr(Lb)*S_x, M_p)  # ∴ M_n_LTB(L_b) = 1365.77 kip*ft
# Prep for Graphing
#
# max_L := max(50 ft, 1.15*max(L_r, L_b)) = 50 ft
# max_M1_LRFD := ϕ*Z_x*F_y = 1481.25 kip*ft  max_M2_ASD := Z_x*F_y/Ω = 985.529 kip*ft
Lb_x := 0 ft, max_L/1000 .. max_L
# Governing Flexural Strength/Resistance
# For an unbraced length of L_b = 15 ft  →  M_n := min(M_n_LTB(L_b), M_n_Y) = 1365.77 kip*ft
#
# ∴ For LRFD, ϕM_n := ϕ*M_n = 1229.19 kip*ft  and for ASD, M_n/Ω = 817.825 kip*ft
# [chart]
    X[1] := Lb_x/ft
    Y[1] := ϕ*M_n_LTB(Lb_x)/(kip*ft)
    X[2] := Lb_x/ft
    Y[2] := M_n_LTB(Lb_x)/(Ω*kip*ft)
    X[3] := Lb_x/ft
    Y[3] := M_n_LTB(Lb_x)/(kip*ft)
