# [Excel component]
    shape := excel["Sheet1!C1"]
    F_y := excel["Sheet1!C2"]*ksi
    E := excel["Sheet1!C3"]*ksi
    Type := excel["Sheet1!B5"]
    A_g := excel["Sheet1!B6"]*in^2
    d := excel["Sheet1!B7"]*in
    b_f := excel["Sheet1!B8"]*in
    t_f := excel["Sheet1!B9"]*in
    t_w := excel["Sheet1!B10"]*in
    b_2tf := excel["Sheet1!B11"]
    λ_pf := excel["Sheet1!D11"]
    λ_rf := excel["Sheet1!E11"]
    h_tw := excel["Sheet1!B12"]
    λ_pw := excel["Sheet1!D12"]
    λ_rw := excel["Sheet1!E12"]
    I_x := excel["Sheet1!B13"]*in^4
    S_x := excel["Sheet1!B14"]*in^3
    r_x := excel["Sheet1!B15"]*in
    Z_x := excel["Sheet1!B16"]*in^3
    I_y := excel["Sheet1!B17"]*in^4
    S_y := excel["Sheet1!B18"]*in^3
    r_y := excel["Sheet1!B19"]*in
    Z_y := excel["Sheet1!B20"]*in^3
    r_ts := excel["Sheet1!B21"]*in
    h_0 := excel["Sheet1!B22"]*in
    J := excel["Sheet1!B23"]*in^4
    C_w := excel["Sheet1!B24"]*in^6
# Input
# Cross Section
# Section Type  Type = "W" shape = "W21X48"
# Gross Area  A_g = 14.1 in^2
# Depth  d = 20.6 in
# Compact section criterial  b_2tf = 9.47  λ_pf = 9.15161  λ_rf = 24.0832
# h_tw = 53.6  λ_pw = 90.5528  λ_rw = 137.274
# Major axis (x-x; notated as z-z axis in STAAD)  I_x = 959 in^4
# S_x = 93 in^3
# r_x = 8.24 in
# Z_x = 107 in^3
# Minor axis (y-y)  I_y = 38.7 in^4
# S_y = 9.52 in^3
# r_y = 1.66 in
# Z_y = 14.1 in^3
# Effective radius for LTB  r_ts = 2.05 in
# Distance between centroids of flanges  h_0 = 20.2 in
# St. Venant Torsional Constant  J = 0.803 in^4
# Warping Constant  C_w = 3950 in^6
#
# Material
# Yield strength  F_y = 50 ksi
# Young's Modulus  E = 29000 ksi
# Shear Modulus  G := 11200 ksi
#
# Unbraced Length  L_b := 15 ft
# F1.  General Provisions
# Resistance factor (LRFD), ϕ := 0.90
# Safety factor (ASD), Ω := 1.67
# Lateral-torsional buckling modification factor, C_b := 1.0 (conservatively assumed)
# F3.  Doubly Symmetric I-Shaped Members with Compact Webs and Noncompact or Slender Flanges Bent About Their Major Axis
# Plastic Moment
M_p := Z_x*F_y = 445.833 kip*ft
# 1.  Lateral-Torsional Buckling
# Limiting laterally unbraced length for yielding, L_p := 1.76*r_y*sqrt(E/F_y) = 5.86345 ft
# Calculation of limiting unbraced length for inelastic LTB
c := if(Type == "C", h_0/2*sqrt(I_y/C_w), 1) = 1
L_r := 1.95*r_ts*E/(0.7*F_y)*sqrt(J*c/(S_x*h_0) + sqrt((J*c/(S_x*h_0))^2 + 6.76*(0.7*F_y/E)^2)) = 16.5481 ft
# Critical Stress, F_cr(Lb) := C_b*π^2*E/(Lb/r_ts)^2*sqrt(1 + 0.078*J*c/(S_x*h_0)*(Lb/r_ts)^2)  ∴  F_cr(L_b) = 41.6233 ksi
M_n_LTB(Lb) :=
    if Lb ≤ L_p
        M_p
    else if Lb ≤ L_r
        min(C_b*(M_p - (M_p - 0.7*F_y*S_x)*((Lb - L_p)/(L_r - L_p))), M_p)
    else
        min(F_cr(Lb)*S_x, M_p)  # ∴ M_n_LTB(L_b) = 296.545 kip*ft
# 2.  Compression Flange Local Buckling
# Determine nominal moment dependent on the flange being noncompact or slender
M_n_FLB :=
    λ ← b_2tf
    if λ < λ_rf
        M_p - (M_p - 0.7*F_y*S_x)*((λ - λ_pf)/(λ_rf - λ_pf))
    else
        k_c ← max(0.35, min(0.76, 4/sqrt(h_tw)))
        0.9*E*k_c*S_x/λ^2  # ∴ M_n_FLB = 442.111 kip*ft
# Prep for Graphing
#
# max_L := max(50 ft, 1.15*max(L_r, L_b)) = 50 ft
# max_M1_LRFD := ϕ*Z_x*F_y = 401.25 kip*ft  max_M2_ASD := Z_x*F_y/Ω = 266.966 kip*ft
Lb_x := 0 ft, max_L/1000 .. max_L
# Governing Flexural Strength/Resistance
# For an unbraced length of L_b = 15 ft  →  M_n := min(M_n_LTB(L_b), M_n_FLB) = 296.545 kip*ft
#
# ∴ For LRFD, ϕM_n := ϕ*M_n = 266.891 kip*ft  and for ASD, M_n/Ω = 177.572 kip*ft
# [chart]
    X[3] := Lb_x/ft
    Y[3] := min(ϕ*M_n_LTB(Lb_x)/(kip*ft), ϕ*M_n_FLB/(kip*ft))
    X[4] := Lb_x/ft
    Y[4] := min(M_n_LTB(Lb_x)/Ω/(kip*ft), M_n_FLB/Ω/(kip*ft))
    X[5] := Lb_x/ft
    Y[5] := min(M_n_LTB(Lb_x)/(kip*ft), M_n_FLB/(kip*ft))
