# [Excel component]
    b_f_top := excel["Plate Girders!B1"]*in
    b_2tf := excel["Plate Girders!B12"]
    t_f_top := excel["Plate Girders!B2"] in
    hc_tw := excel["Plate Girders!B13"]
    h_w := excel["Plate Girders!B3"]*in
    λ_pf := excel["Plate Girders!C12"]
    t_w := excel["Plate Girders!B4"]*in
    λ_rf := excel["Plate Girders!D12"]
    b_f_bottom := excel["Plate Girders!B5"]*in
    λ_pw := excel["Plate Girders!C13"]
    t_f_bottom := excel["Plate Girders!B6"]*in
    λ_rw := excel["Plate Girders!D13"]
    F_y := excel["Plate Girders!B7"]*ksi
    E := excel["Plate Girders!B8"]*ksi
    y_c_top := excel["Plate Girders!B24"]*in
    y_pc_top := excel["Plate Girders!B37"]*in
    y_c_bottom := excel["Plate Girders!B25"]*in
    y_pc_bottom := excel["Plate Girders!B38"]*in
    I_x := excel["Plate Girders!B26"]*in^4
    S_x_top := excel["Plate Girders!B28"]*in^3
    t_fc := excel["Plate Girders!B43"]*in
    S_x_bottom := excel["Plate Girders!B29"]*in^3
    b_fc := excel["Plate Girders!B44"]*in
    S_y := excel["Plate Girders!B30"]*in^3
    y_cc := excel["Plate Girders!B45"]*in
    r_x := excel["Plate Girders!B31"]*in
    h_c := excel["Plate Girders!B48"]*2*in
    r_y := excel["Plate Girders!B32"]*in
    I_yc := excel["Plate Girders!B50"]*in^4
    J := excel["Plate Girders!B33"]*in^4
    S_xc := excel["Plate Girders!B49"]*in^3
    I_y := excel["Plate Girders!B27"]*in^4
    C_w := excel["Plate Girders!B34"]*in^6
    t_ft := excel["Plate Girders!B53"]*in
    Z_x := excel["Plate Girders!B35"]*in^3
    b_ft := excel["Plate Girders!B54"]*in
    Z_y := excel["Plate Girders!B36"]*in^3
    y_ct := excel["Plate Girders!B55"]*in
    S_xt := excel["Plate Girders!B57"]*in^3
# Input
# Cross Section
# Size of compression flange  b_fc = 22 in  t_fc = 1.75 in
# Twice the distance from the centroid to the inside of comp. flg.  h_c = 79 in
# Web Size  h_w = 54 in  t_w = 0.5 in
# Size of tension flange  b_ft = 24 in  t_ft = 2.125 in
#
# Distance between centroids of flange  h_0 := 1/2*(t_fc + t_ft) + h_w = 55.9375 in
#
# Compact section criterial  b_2tf = 6.28571  λ_pf = 9.15161  λ_rf = 24.0832
# hc_tw = 120.292  λ_pw = 61.8149  λ_rw := 137.27
#
# Major axis (x-x; notated as z-z axis in STAAD)  I_x = 75567.7 in^4
# S_xc = 2374.63 in^3
# S_xt = 2900.64 in^3
# r_x = 25.4686 in
# Z_x = 2790.75 in^3
#
# Minor axis (y-y)  I_y = 4001.4 in^4
# I_yc = 1552.83 in^4
# S_y = 333.45 in^3
# r_y = 5.86061 in
# Z_y = 521.125 in^3
#
# St. Venant Torsional Constant  J = 112.621 in^4
# Warping Constant  C_w = 2973532 in^6
#
# Material
# Yield strength  F_y = 50 ksi
# Young's Modulus  E = 29000 ksi
# Shear Modulus  G := 11200 ksi
#
# Unbraced Length  L_b := 32 ft
# F1.  General Provisions
# Resistance factor (LRFD), ϕ := 0.90
# Safety factor (ASD), Ω := 1.67
# Lateral-torsional buckling modification factor, C_b := 1.0 (conservatively)
# F4.  Other I-Shaped Members with Compact or Noncompact Webs Bent about their Major Axis
# Plastic Moment, M_p := min(1.6*F_y*S_xc, Z_x*F_y) = 11628.1 kip*ft
# Yield Moment in the Compression Flange, M_yc := F_y*S_xc = 9894.28 kip*ft
# Yield Moment in the Tension Flange, M_yt := F_y*S_xt = 12086 kip*ft
# 1.  Compression Flange Yielding
# Web Plastification Factor
# R_pc := if I_yc/I_y > 0.23 if hc_tw ≤ λ_pw M_p/M_yc else min(M_p/M_yc, M_p/M_yc - (M_p/M_yc - 1)*((hc_tw - λ_pw)/(λ_rw - λ_pw))) else 1.0  ∴ R_pc = 1.03943
#
# M_n_CFY := R_pc*M_yc  ∴ M_n_CFY = 10284.4 kip*ft
# 2.  Lateral-Torsional Buckling
# Limiting laterally unbraced length for yielding
# Effective radius of gyration for LTB, r_t := a_w ← h_c*t_w/(b_fc*t_fc) b_fc/sqrt(12*(1 + 1/6*a_w))  ∴ r_t = 5.86887 in
# Critical stress, F_cr(Lb) := if I_yc/I_y ≤ 0.23 J ← 0 C_b*π^2*E/(Lb/r_t)^2*sqrt(1 + 0.078*J/(S_xc*h_0)*(Lb/r_t)^2) ∴ F_cr(L_b) = 66.8566 ksi
# Nominal compression flange stress above which the inelastic buckling limit states apply
# F_L := if S_xt/S_xc ≥ 0.7 0.7*F_y else min(0.5*F_y, F_y*S_xt/S_xc)  ∴ F_L = 35 ksi
#
# Therefore, L_p := 1.1*r_t*sqrt(E/F_y) = 12.9563 ft
#
# Limiting unbraced length for inelastic LTB
# L_r := 1.95*r_t*E/F_L*sqrt(J/(S_xc*h_0) + sqrt((J/(S_xc*h_0))^2 + 6.76*(F_L/E)^2)) = 50.5871 ft
#
# M_n_LTB(Lb) := if Lb ≤ L_p R_pc*M_yc else if Lb ≤ L_r min(C_b*(R_pc*M_yc - (R_pc*M_yc - F_L*S_xc)*((Lb - L_p)/(L_r - L_p))), R_pc*M_yc) else min(F_cr(Lb)*S_xc, R_pc*M_yc) ∴ M_n_LTB(L_b) = 8584.83 kip*ft
# 3.  Compression Flange Local Buckling
# Determine nominal moment dependent on the flange being noncompact or slender
M_n_FLB :=
    λ ← b_2tf
    if λ < λ_pf
        R_pc*M_yc
    else if λ < λ_rf
        R_pc*M_yc - (R_pc*M_yc - 0.7*F_L*S_xc)*((λ - λ_pf)/(λ_rf - λ_pf))
    else
        k_c ← max(0.35, min(0.76, 4/sqrt(hc_tw)))
        0.9*E*k_c*S_xc/λ^2  # ∴ M_n_FLB = 10284.4 kip*ft
# 4.  Tension Flange Yielding
# Web Plastification factor corresponding to the tension flange yielding limit state
# R_pt := if I_yc/I_y > 0.23 if hc_tw ≤ λ_pw M_p/M_yt else min(M_p/M_yt - (M_p/M_yt - 1)*((hc_tw - λ_pw)/(λ_pw - λ_rw)), M_p/M_yt) else 1.0  ∴ R_pt = 0.932752
#
# M_n_TFY := R_pt*M_yt = 11273.3 kip*ft
x := 0 ft, 200 ft/500 .. 200 ft
# Governing Flexural Strength/Resistance
# For an unbraced length of L_b = 32 ft  →  M_n := min(M_n_LTB(L_b), M_n_CFY, M_n_FLB, M_n_TFY) = 8584.83 kip*ft
#
# ∴ For LRFD, ϕM_n := ϕ*M_n = 7726.35 kip*ft  and for ASD, M_n/Ω = 5140.62 kip*ft
# [chart]
    X[1] := x/ft
    Y[1] := min(M_n_LTB(x), M_n_CFY, M_n_FLB, M_n_TFY)/(kip*ft)
    X[2] := x/ft
    Y[2] := ϕ*min(M_n_LTB(x), M_n_CFY, M_n_FLB, M_n_TFY)/(kip*ft)
    X[3] := x/ft
    Y[3] := min(M_n_LTB(x), M_n_CFY, M_n_FLB, M_n_TFY)/Ω/(kip*ft)
