# [Excel component]
    b_f_top := excel["Plate Girders!B1"]*in
    b_2tf := excel["Plate Girders!B12"]
    t_f_top := excel["Plate Girders!B2"] in
    hc_tw := excel["Plate Girders!B13"]
    h_w := excel["Plate Girders!B3"]*in
    λ_pf := excel["Plate Girders!C12"]
    t_w := excel["Plate Girders!B4"]*in
    λ_rf := excel["Plate Girders!D12"]
    b_f_bottom := excel["Plate Girders!B5"]*in
    λ_pw := excel["Plate Girders!C13"]
    t_f_bottom := excel["Plate Girders!B6"]*in
    λ_rw := excel["Plate Girders!D13"]
    F_y := excel["Plate Girders!B7"]*ksi
    E := excel["Plate Girders!B8"]*ksi
    y_c_top := excel["Plate Girders!B24"]*in
    y_pc_top := excel["Plate Girders!B37"]*in
    y_c_bottom := excel["Plate Girders!B25"]*in
    y_pc_bottom := excel["Plate Girders!B38"]*in
    I_x := excel["Plate Girders!B26"]*in^4
    S_x_top := excel["Plate Girders!B28"]*in^3
    t_fc := excel["Plate Girders!B43"]*in
    S_x_bottom := excel["Plate Girders!B29"]*in^3
    b_fc := excel["Plate Girders!B44"]*in
    S_y := excel["Plate Girders!B30"]*in^3
    y_cc := excel["Plate Girders!B45"]*in
    r_x := excel["Plate Girders!B31"]*in
    h_c := excel["Plate Girders!B48"]*2*in
    r_y := excel["Plate Girders!B32"]*in
    I_yc := excel["Plate Girders!B50"]*in^4
    J := excel["Plate Girders!B33"]*in^4
    S_xc := excel["Plate Girders!B49"]*in^3
    I_y := excel["Plate Girders!B27"]*in^4
    C_w := excel["Plate Girders!B34"]*in^6
    t_ft := excel["Plate Girders!B53"]*in
    Z_x := excel["Plate Girders!B35"]*in^3
    b_ft := excel["Plate Girders!B54"]*in
    Z_y := excel["Plate Girders!B36"]*in^3
    y_ct := excel["Plate Girders!B55"]*in
    S_xt := excel["Plate Girders!B57"]*in^3
# Input
# Cross Section
# Size of compression flange  b_fc = 22 in  t_fc = 1.75 in
# Twice the distance from the centroid to the inside of comp. flg.  h_c = 87.3333 in
# Web Size  h_w = 54 in  t_w = 0.375 in
# Size of tension flange  b_ft = 24 in  t_ft = 2.125 in
#
# Distance between centroids of flange  h_0 := 1/2*(t_fc + t_ft) + h_w = 55.9375 in
#
# Compact section criterial  b_2tf = 6.28571  λ_pf = 9.15161  λ_rf = 24.0832
# hc_tw = 161.397  λ_pw = 58.1511  λ_rw := 137.27
#
# Major axis (x-x; notated as z-z axis in STAAD)  I_x = 73859.8 in^4
# S_xc = 2307.26 in^3
# S_xt = 2855.8 in^3
# r_x = 25.9419 in
# Z_x = 2673.58 in^3
#
# Minor axis (y-y)  I_y = 4001.07 in^4
# I_yc = 1552.83 in^4
# S_y = 333.423 in^3
# r_y = 6.0379 in
# Z_y = 519.648 in^3
#
# St. Venant Torsional Constant  J = 111.092 in^4
# Warping Constant  C_w = 2973822 in^6
#
# Material
# Yield strength  F_y = 50 ksi
# Young's Modulus  E = 29000 ksi
# Shear Modulus  G := 11200 ksi
#
# Unbraced Length  L_b := 32 ft
# F1.  General Provisions
# Resistance factor (LRFD), ϕ := 0.90
# Safety factor (ASD), Ω := 1.67
# Lateral-torsional buckling modification factor, C_b := 1.0 (conservatively)
# F5.  Doubly Symmetric and Singly Symmetric I-Shaped Members With Slender Webs Bent About Their Major Axis
# Plastic Moment, M_p := min(1.6*F_y*S_xc, Z_x*F_y) = 11139.9 kip*ft
# Yield Moment in the Compression Flange, M_yc := F_y*S_xc = 9613.57 kip*ft
# Yield Moment in the Tension Flange, M_yt := F_y*S_xt = 11899.2 kip*ft
# 1.  Compression Flange Yielding
# Bending Strength Reduction Factor
# R_pg := a_w ← max(h_c*t_w/(b_fc*t_fc), 10) 1 - a_w/(1200 + 300*a_w)*(hc_tw - 5.7*sqrt(E/F_y))  ∴ R_pg = 0.942564
#
# M_n_CFY := R_pg*M_yc  ∴ M_n_CFY = 9061.41 kip*ft
# 2.  Lateral-Torsional Buckling
# Limiting laterally unbraced length for yielding
# Effective radius of gyration for LTB, r_t := a_w ← h_c*t_w/(b_fc*t_fc) b_fc/sqrt(12*(1 + 1/6*a_w))  ∴ r_t = 5.94349 in
# Therefore, L_p := 1.1*r_t*sqrt(E/F_y) = 13.121 ft
#
# Limiting unbraced length for inelastic LTB
# L_r := π*r_t*sqrt(E/(0.7*F_y)) = 44.7894 ft
#
# Critical stress, F_cr(Lb) := if Lb ≤ L_p F_y else if Lb ≤ L_r min(C_b*(F_y - (0.3*F_y*((Lb - L_p)/(L_r - L_p)))), F_y) else min(C_b*π^2*E/(Lb/r_t)^2, F_y) ∴  F_cr(L_b) = 41.0578 ksi
#
# M_n_LTB(Lb) := R_pg*F_cr(Lb)*S_xc  ∴ M_n_LTB(L_b) = 7440.83 kip*ft
# 3.  Compression Flange Local Buckling
# Critical stress
F_cr :=
    λ ← b_2tf
    if λ < λ_pf
        F_y
    else if λ < λ_rf
        F_y - (0.3*F_y)*((λ - λ_pf)/(λ_rf - λ_pf))
    else
        k_c ← max(0.35, min(0.76, 4/sqrt(hc_tw)))
        0.9*E*k_c/λ^2  # ∴ F_cr = 50 ksi
M_n_FLB := R_pg*F_cr*S_xc = 9061.41 kip*ft
# 4.  Tension Flange Yielding
#
# M_n_TFY := M_yt = 11899.2 kip*ft
x := 0 ft, 200 ft/500 .. 200 ft
# Governing Flexural Strength/Resistance
# For an unbraced length of L_b = 32 ft  →  M_n := min(M_n_LTB(L_b), M_n_CFY, M_n_FLB, M_n_TFY) = 7440.83 kip*ft
#
# ∴ For LRFD, ϕM_n := ϕ*M_n = 6696.75 kip*ft  and for ASD, M_n/Ω = 4455.59 kip*ft
# [chart]
    X[1] := x/ft
    Y[1] := min(M_n_LTB(x), M_n_CFY, M_n_FLB, M_n_TFY)/(kip*ft)
    X[2] := x/ft
    Y[2] := ϕ*min(M_n_LTB(x), M_n_CFY, M_n_FLB, M_n_TFY)/(kip*ft)
    X[3] := x/ft
    Y[3] := min(M_n_LTB(x), M_n_CFY, M_n_FLB, M_n_TFY)/Ω/(kip*ft)
