# [Excel component]
    F_y := excel["EXPORT!D5"]*ksi
    E := excel["EXPORT!D6"]*ksi
    Z_y := excel["EXPORT!D7"]*in^3
    S_y := excel["EXPORT!D8"]*in^3
    b_tf := excel["EXPORT!D9"]
    λ_pf := excel["EXPORT!D10"]
    λ_rf := excel["EXPORT!D11"]
    Section := excel["EXPORT!D12"]
# Input
# Cross Section  Section = "Plate Girder"
# Weak axis plastic modulus  Z_y = 266.898 in^3
# Weak axis elastic modulus  S_y = 169.964 in^3
# Flange slenderness ratio  λ := b_tf = 11
# λ_pf = 9.15161
# λ_rf = 24.0832
# Yield strength  F_y = 50 ksi
# Young's Modulus  E = 29000 ksi
# Shear Modulus  G := 11200 ksi
# F1.  General Provisions
# Resistance factor (LRFD), ϕ := 0.90
# Safety factor (ASD), Ω := 1.67
# F6.  I-Shaped Members and Channels Bent About Their Minor Axis
# 1.  Yielding
# M_n_Y := min(F_y*Z_y, 1.6*F_y*S_y) = 1112.08 kip*ft
# 2.  Flange Local Buckling
# Critical stress, F_cr := 0.69*E/λ^2 = 165.372 ksi
#
# M_n_FLB := if λ ≤ λ_pf M_n_Y else if λ ≤ λ_rf M_n_Y - (M_n_Y - 0.7*F_y*S_y)*((λ - λ_pf)/(λ_rf - λ_pf)) else F_cr*S_y  ∴ M_n_FLB = 1035.78 kip*ft
# Governing Flexural Strength/Resistance
M_n := min(M_n_Y, M_n_FLB) = 1035.78 kip*ft
# For LRFD, ϕM_n := ϕ*M_n = 932.201 kip*ft  For ASD, M_n/Ω = 620.227 kip*ft
