# [Excel component]
    b := excel["Box and HSS!B1"]*in
    t_fc := excel["Box and HSS!B44"]*in
    d := excel["Box and HSS!B2"]*in
    t_ft := excel["Box and HSS!B45"]*in
    I_x := excel["Box and HSS!B25"]*in^4
    I_y := excel["Box and HSS!B26"]*in^4
    S_xc := excel["Box and HSS!B42"]*in^3
    b_tf := excel["Box and HSS!B11"]
    S_xt := excel["Box and HSS!B43"]*in^3
    λ_pf := excel["Box and HSS!C11"]
    Z_x := excel["Box and HSS!B34"]*in^3
    λ_rf := excel["Box and HSS!D11"]
    Z_y := excel["Box and HSS!B35"]*in^3
    h_t := excel["Box and HSS!B12"]
    r_x := excel["Box and HSS!B30"]*in
    λ_pw := excel["Box and HSS!C12"]
    r_y := excel["Box and HSS!B31"]*in
    λ_rw := excel["Box and HSS!D12"]
    J := excel["Box and HSS!B32"]*in^4
    section := excel["Box and HSS!B46"]
    S_y := excel["Box and HSS!B29"]*in^3
    F_y := excel["Box and HSS!B7"]*ksi
    E := excel["Box and HSS!B8"]*ksi
# Input
# Cross Section  section = "HSS"
# Out-out size  b = 4 in  d = 6 in
#
# Twice the distance from the centroid to the inside of comp. flg.  h_c =
# Web Size  h_w =  t_w =
# Size of tension flange  b_ft =  t_ft = 0.465 in
#
# Distance between centroids of flange  h_0 := 1/2*(t_fc + t_ft) + h_w
#
# Compact section criterial  b_tf = 4.60215  λ_pf = 26.9732  λ_rf = 33.7165
# h_t = 10.9032  λ_pw = 58.2813  λ_rw := 137.27
#
# Major axis (x-x; notated as z-z axis in STAAD)  I_x = 33.8151 in^4
# S_xc = 11.2717 in^3
# S_xt = 11.2717 in^3
# r_x = 2.07401 in
# Z_x = 14.6026 in^3
#
# Minor axis (y-y)  I_y = 17.6954 in^4
# S_y = 8.84772 in^3
# r_y = 1.50033 in
# Z_y = 10.9589 in^3
#
# St. Venant Torsional Constant  J = 40.8597 in^4
# Warping Constant  C_w =
#
# Material
# Yield strength  F_y = 50 ksi
# Young's Modulus  E = 29000 ksi
# Shear Modulus  G := 11200 ksi
#
# Unbraced Length  L_b := 32 ft
# F1.  General Provisions
# Resistance factor (LRFD), ϕ := 0.90
# Safety factor (ASD), Ω := 1.67
# Lateral-torsional buckling modification factor, C_b := 1.0 (conservatively)
# F7.  Square and Rectangular HSS and Box Sections
# 1.  Yielding
# M_p := F_y*Z_x  ∴ M_n_Y := M_p = 60.844 kip*ft
# 2. Flange Local Buckling
M_n_FLB :=
    if b_tf ≤ λ_pf
        M_p
    else if b_tf ≤ λ_rf
        min(M_p, M_p - (M_p - F_y*S_xc)*(3.57*b_tf*sqrt(F_y/E) - 4.0))
    else
        b_ce ← min(b, 1.92*t_fc*sqrt(E/F_y)*(1 - 0.38/b_tf*sqrt(E/F_y)))  # ∴  M_n_FLB = 60.844 kip*ft
# 3.  Compression Flange Local Buckling
# Determine nominal moment dependent on the flange being noncompact or slender
M_n_FLB :=
    λ ← b_2tf
    if λ < λ_pf
        R_pc*M_yc
    else if λ < λ_rf
        R_pc*M_yc - (R_pc*M_yc - 0.7*F_L*S_xc)*((λ - λ_pf)/(λ_rf - λ_pf))
    else
        k_c ← max(0.35, min(0.76, 4/sqrt(hc_tw)))
        0.9*E*k_c*S_xc/λ^2  # ∴ M_n_FLB =
# 4.  Tension Flange Yielding
# Web Plastification factor corresponding to the tension flange yielding limit state
# R_pt := if I_yc/I_y > 0.23 if hc_tw ≤ λ_pw M_p/M_yt else min(M_p/M_yt - (M_p/M_yt - 1)*((hc_tw - λ_pw)/(λ_pw - λ_rw)), M_p/M_yt) else 1.0  ∴ R_pt =
#
# M_n_TFY := R_pt*M_yt
x := 0 ft, 200 ft/500 .. 200 ft
# Governing Flexural Strength/Resistance
# For an unbraced length of L_b = 32 ft  →  M_n := min(M_n_LTB(L_b), M_n_CFY, M_n_FLB, M_n_TFY)
#
# ∴ For LRFD, ϕM_n := ϕ*M_n  and for ASD, M_n/Ω =
# [chart]
    X[1] := x/ft
    Y[1] := min(M_n_LTB(x), M_n_CFY, M_n_FLB, M_n_TFY)/(kip*ft)
    X[2] := x/ft
    Y[2] := ϕ*min(M_n_LTB(x), M_n_CFY, M_n_FLB, M_n_TFY)/(kip*ft)
    X[3] := x/ft
    Y[3] := min(M_n_LTB(x), M_n_CFY, M_n_FLB, M_n_TFY)/Ω/(kip*ft)
