# Input
# [Excel component]
    [E3, E4, E5, E6, E7] := excel["Instructions!R16:V16"]
    is_slender := excel["Instructions!M7"]
    λ := excel["Slenderness!K9"]
    λ_r := excel["Slenderness!K10"]
# Effective length factor (x, y, z)
k := [1.0, 1.0, 1.0]
# Laterally unbraced member length (x, y, z)
L := [25 ft, 25 ft, 25 ft]
# Member radius of gyration (x, y)
r := [5.1 in, 2.8 in]
# Warping Constant
C_w := 1000 in^6
# Gross cross-sectional area of member
A_g := 15.5 in^2
# Coordinates of shear center w.r.t. centroid
[x_0, y_0] := [0 in, 0 in]
# Moment of inertia about local X axis
I_x := 1400 in^4
# Moment of inertia about local Y axis
I_y := 120 in^4
# Torsional constant
J := 10 in^4
# Axis of symmetry
symmetry := "xy"  # list choice: Single about x axis = "x", Single about y axis = "y", Doubly symmetric = "xy", Unsymmetric = "u" = "xy"
# Yield strength
F_y := 50 ksi
# Young's Modulus
E := 29000 ksi
# Shear Modulus
G := 11200 ksi
# Ultimate/design compressive force
P_u := 111 kip
# E1.  General Provisions
# Resistance factor (LRFD), ϕ := 0.90
# Safety factor (ASD), Ω := 1.67
# Member slenderness
λ = 48
# Limiting slenderness
λ_r = 13.4866
is_slender = "Y"
# E2.  Effective Length
L_cx := k[0, 0]*L[0, 0] = 25 ft
L_cy := k[0, 1]*L[0, 1] = 25 ft
L_cz := k[0, 2]*L[0, 2] = 25 ft
# E3.  Flexural Buckling of Members without Slender Elements
# Section applicable?
E3 = "N"
# Elastic buckling stress,  F_ex := π^2*E/(L_cx/r[0, 0])^2 = 82.7172 ksi  F_ey := π^2*E/(L_cy/r[0, 1])^2 = 24.9328 ksi
# Critical stress, F_crx := if L_cx/r[0, 0] ≤ 4.71*sqrt(E/F_y) (0.658^(F_y/F_ex))*F_y else 0.877*F_ex = 38.8234 ksi  F_cry := if L_cy/r[0, 1] ≤ 4.71*sqrt(E/F_y) (0.658^(F_y/F_ey))*F_y else 0.877*F_ey = 21.5994 ksi
#
# F_cr := min(F_crx, F_cry) = 21.5994 ksi
# For the flexural buckling limit state, P_n := F_cr*A_g = 334.791 kip
# For LRFD, ϕP_n := ϕ*P_n = 301.312 kip
# For ASD, P_n/Ω = 200.474 kip
results := [ϕP_n/kip, ϕP_n/P_u, P_n/Ω/kip, P_n/(Ω*P_u), "E3 - Flexural Buckling of Members w/o Slender Elements"] = [301.312, 2.71452, 200.474, 1.80607, "E3 - Flexural Buckling of Members w/o Slender Elements"]
# E4.  Torsional and Flexural-Torsional Buckling of Single Angles and Members Without Slender Elements
# Section applicable?
E4 = "N"
# Polar radius of gyration about shear center
rbar_0 := sqrt(x_0^2 + y_0^2 + (I_x + I_y)/A_g) = 9.90275 in
# Flexural Constant
H := 1 - (x_0^2 + y_0^2)/rbar_0^2 = 1
# Elastic torsional buckling stress
F_ez := (π^2*E*C_w/L_cz^2 + G*J)*1/(A_g*rbar_0^2) = 75.7765 ksi
# Critical Stress
# For singly symmetric (a) and doubly symmetric (b) members twisting about shear center:
F_e_sym :=
    if symmetry == "xy"
        (π^2*E*C_w/L_cz^2 + G*J)*1/(I_x + I_y)
    else if symmetry == "u"
        0
    else
        if symmetry == "x"
            F ← F_ex
        else
            F ← F_ey
        ((F + F_ez)/(2*H))*(1 - sqrt(1 + 4*F*F_ez*H/(F + F_ez)^2))
    = 75.7765 ksi
# For unsymmetric members twisting about shear center:
F_e_unsym := (F - F_ex)*(F - F_ey)*(F - F_ez) - F^2*(F - F_ey)*(x_0/rbar_0)^2 - F^2*(F - F_ex)*(y_0/rbar_0)^2 == 0 solve, F → [82.7171544855*ksi; 75.7764512254*ksi; 24.9328139626*ksi]
F_e_unsym := min(F_e_unsym) = 24.9328 ksi
F_e := if(symmetry == "u", F_e_unsym, F_e_sym) = 75.7765 ksi
# For the limit state, P_n := F_e*A_g = 1174.53 kip
# For LRFD, ϕP_n := ϕ*P_n = 1057.08 kip
# For ASD, P_n/Ω = 703.314 kip
results :=
    sec ←
        if symmetry == "xy"
            "E4(a) TB/FTB Doubly symmetric"
        else if symmetry == "u"
            "E4 (c) TB/FTB Unsymmetric"
        else
            "E4 (b) TB/FTB Singly symmetric"
    m ← [ϕP_n/kip, ϕP_n/P_u, P_n/Ω/kip, P_n/(Ω*P_u), sec]
    stack(results, m)
    = [
        301.312, 2.71452, 200.474, 1.80607, "E3 - Flexural Buckling of Members w/o Slender Elements";
        1057.08, 9.52326, 703.314, 6.33617, "E4(a) TB/FTB Doubly symmetric"
    ]
# E5. Single-Angle Compression Members  Section applicable?  E5 = "N"
# Nominal compressive strength is lowest value of FB (Section E3 or E7) or FTB (Section E4) if λ > 0.71*sqrt(E/F_y).
# Neglect FTB?  λ_rE5 ← 0.71*sqrt(E/F_y) if(λ ≤ λ_rE5, "Y", "N") = "N"
#
# Effects of eccentricity shall be neglected if the following are satisfied (otherwise, evaluate combined axial and bending per Chapter H):
# - Members are loaded at the ends in compression through the same leg
# - Members are attached by welding or by connections with a minimum of two (2) bolts
# - There are no intermediate transverse loads
# - L_c/r ≤ 200  As defined in this section
# - For unequal leg angles, the ratio of long leg width (b_l) to short leg width (b_s) is less than 1.7
# If the above criteria are met, evaluate as axially loaded members with the following values:
#
# Long leg length, b_l := 6 in
# Short leg length, b_s := 4 in
# Ratio of long/short leg lengths, b_l/b_s = 1.5
# Length of member, L_a := max(L) = 25 ft
#
# Connected leg, connected_leg := 1  # list choice: x = 0, y = 1  ∴  r_a := r[0, connected_leg] = 2.8 in
#
# (a) For angles that are individual members or web members or web members of planar trusses w/ adjacent  members attached to the same side of the gusset plate or chord:
#
# (1) Angles connected through the longer leg
# bp := if L_a/r_a ≤ 80 72 + L_a/r_a else 32 + 1.25*L_a/r_a = 165.929
# Flexural Buckling per E3
# Elastic buckling stress, F_e := π^2*E/bp^2 = 10.3957 ksi
# Critical stress, F_cr := if bp ≤ 4.71*sqrt(E/F_y) (0.658^(F_y/F_e))*F_y else 0.877*F_e = 9.11706 ksi
#
# For the flexural buckling limit state, P_n := F_cr*A_g = 141.314 kip
# For LRFD, ϕP_n := ϕ*P_n = 127.183 kip
# For ASD, P_n/Ω = 84.6195 kip
results :=
    sec ← "E5(a)(1) - FB"
    m ← [ϕP_n/kip, ϕP_n/P_u, P_n/Ω/kip, P_n/(Ω*P_u), sec]
    stack(results, m)
    = [
        301.312, 2.71452, 200.474, 1.80607, "E3 - Flexural Buckling of Members w/o Slender Elements";
        1057.08, 9.52326, 703.314, 6.33617, "E4(a) TB/FTB Doubly symmetric";
        127.183, 1.14579, 84.6195, 0.762337, "E5(a)(1) - FB"
    ]
# (2) Angles connected through the shorter leg
# bp := max(0.95*L_a/r[0, 1], bp + 4*((b_l/b_s)^2 - 1)) = 170.929
# Flexural Buckling per E3
# Elastic buckling stress, F_e := π^2*E/bp^2 = 9.79644 ksi
# Critical stress, F_cr := if bp ≤ 4.71*sqrt(E/F_y) (0.658^(F_y/F_e))*F_y else 0.877*F_e = 8.59148 ksi
#
# For the flexural buckling limit state, P_n := F_cr*A_g = 133.168 kip
# For LRFD, ϕP_n := ϕ*P_n = 119.851 kip
# For ASD, P_n/Ω = 79.7413 kip
# (b) For angles that are individual members or web members or web members of box or space trusses w/ adjacent  members attached to the same side of the gusset plate or chord:
#
# (1) Angles connected through the longer leg
# bp := if L_a/r_a ≤ 75 60 + 0.8*L_a/r_a else 45 + L_a/r_a = 152.143
# Flexural Buckling per E3
# Elastic buckling stress, F_e := π^2*E/bp^2 = 12.365 ksi
# Critical stress, F_cr := if bp ≤ 4.71*sqrt(E/F_y) (0.658^(F_y/F_e))*F_y else 0.877*F_e = 10.8441 ksi
#
# For the flexural buckling limit state, P_n := F_cr*A_g = 168.084 kip
# For LRFD, ϕP_n := ϕ*P_n = 151.275 kip
# For ASD, P_n/Ω = 100.649 kip
results :=
    sec ← "E5(b)(1) - FB"
    m ← [ϕP_n/kip, ϕP_n/P_u, P_n/Ω/kip, P_n/(Ω*P_u), sec]
    stack(results, m)
    = [
        301.312, 2.71452, 200.474, 1.80607, "E3 - Flexural Buckling of Members w/o Slender Elements";
        1057.08, 9.52326, 703.314, 6.33617, "E4(a) TB/FTB Doubly symmetric";
        127.183, 1.14579, 84.6195, 0.762337, "E5(a)(1) - FB";
        151.275, 1.36284, 100.649, 0.906748, "E5(b)(1) - FB"
    ]
# (2) Angles connected through the shorter leg
# bp := max(0.82*L_a/r[0, 1], bp + 6*((b_l/b_s)^2 - 1)) = 159.643
# Flexural Buckling per E3
# Elastic buckling stress, F_e := π^2*E/bp^2 = 11.2305 ksi
# Critical stress, F_cr := if bp ≤ 4.71*sqrt(E/F_y) (0.658^(F_y/F_e))*F_y else 0.877*F_e = 9.84914 ksi
#
# For the flexural buckling limit state, P_n := F_cr*A_g = 152.662 kip
# For LRFD, ϕP_n := ϕ*P_n = 137.396 kip
# For ASD, P_n/Ω = 91.4142 kip
results :=
    sec ← "E5(b)(2) - FB"
    m ← [ϕP_n/kip, ϕP_n/P_u, P_n/Ω/kip, P_n/(Ω*P_u), sec]
    stack(results, m)
    = [
        301.312, 2.71452, 200.474, 1.80607, "E3 - Flexural Buckling of Members w/o Slender Elements";
        1057.08, 9.52326, 703.314, 6.33617, "E4(a) TB/FTB Doubly symmetric";
        127.183, 1.14579, 84.6195, 0.762337, "E5(a)(1) - FB";
        151.275, 1.36284, 100.649, 0.906748, "E5(b)(1) - FB";
        137.396, 1.2378, 91.4142, 0.823551, "E5(b)(2) - FB"
    ]
# E6. Built-up Members
# E7. Members with Slender Elements
results :=
    sec ← "E5(a)(2) - FB"
    m ← [ϕP_n/kip, ϕP_n/P_u, P_n/Ω/kip, P_n/(Ω*P_u), sec]
    stack(results, m)
    = [
        301.312, 2.71452, 200.474, 1.80607, "E3 - Flexural Buckling of Members w/o Slender Elements";
        1057.08, 9.52326, 703.314, 6.33617, "E4(a) TB/FTB Doubly symmetric";
        127.183, 1.14579, 84.6195, 0.762337, "E5(a)(1) - FB";
        151.275, 1.36284, 100.649, 0.906748, "E5(b)(1) - FB";
        137.396, 1.2378, 91.4142, 0.823551, "E5(b)(2) - FB";
        137.396, 1.2378, 91.4142, 0.823551, "E5(a)(2) - FB"
    ]
# Results
# [Excel component]
    excel["Sheet1!A3"] := results
    [lrfd_rating, ϕP_n, lrfd_section; asd_rating, P_a, asd_section] := excel["Results!B1:D2"]
# Governing Tension Strength (LRFD), ϕP_n*kip = 127.183 kip
# Capacity / Demand Ratio (LRFD), lrfd_rating = 1.14579
#
# Governing Tension Strength (ASD), P_a*kip = 84.6195 kip
# Capacity / Demand Ratio (ASD), asd_rating = 0.762337
