calc_import := □  # error: Missing term or expression.
# Input
# Cross Section (Plate Girder - Figure out auto import later)
# Size of compression flange  b_fc := 24 in  t_fc := 1.75 in
# Twice the distance from the centroid to the inside of comp. flg.  h_c := 58.34 in
# Web Size  h_w := 54 in  t_w := 0.5 in
# Size of tension flange  b_ft := 24 in  t_ft := 2.125 in
#
# Distance between centroids of flange  h_0 := 1/2*(t_fc + t_ft) + h_w = 55.9375 in
#
# Compact section criterial  b_2tf := 6.8  λ_pf := 9.15  λ_rf := 24.08
# hc_tw := 116.681  λ_pw := 69.52  λ_rw := 137.27
#
# Major axis (x-x; notated as z-z axis in STAAD)  I_x := 78823 in^4
# S_xc := 2549 in^3
# S_xt := 2924 in^3
# r_x := 25.6 in
# Z_x := 2925 in^3
#
# Minor axis (y-y)  I_y := 4464 in^4
# I_yc := 2924 in^4
# S_y := 372 in^3
# r_y := 6.1 in
# Z_y := 561 in^3
#
# St. Venant Torsional Constant  J := 116 in^4
# Warping Constant  C_w := 3459816 in^6
#
# Material
# Yield strength  F_y := 50 ksi
# Young's Modulus  E := 29000 ksi
# Shear Modulus  G := 11200 ksi
#
# Unbraced Length  L_b := 32 ft
L_b := 75 ft
# F1.  General Provisions
# Resistance factor (LRFD), ϕ := 0.90
# Safety factor (ASD), Ω := 1.67
# Lateral-torsional buckling modification factor (C_b)
# UNTIL I FIGURE IT OUT MORE CLOSELY.... C_b := 1.0
# F4.  Other I-Shaped Members with Compact or Noncompact Webs Bent about their Major Axis
# Plastic Moment, M_p := min(1.6*F_y*S_xc, Z_x*F_y) = 12187.5 kip*ft
# Yield Moment in the Compression Flange, M_yc := F_y*S_xc = 10620.8 kip*ft
# 1.  Compression Flange Yielding
# Web Plastification Factor
# R_pc := if I_yc/I_y > 0.23 if hc_tw ≤ λ_pw M_p/M_yc else min(M_p/M_yc, M_p/M_yc - (M_p/M_yc - 1)*((hc_tw - λ_pw)/(λ_rw - λ_pw))) else 1.0 = 1.04483
#
# M_n_CFY := R_pc*M_yc  ∴ M_n_CFY = 11096.9 kip*ft
# 2.  Lateral-Torsional Buckling
# Limiting laterally unbraced length for yielding
# Effective radius of gyration for LTB, r_t := a_w ← h_c*t_w/(b_fc*t_fc) b_fc/sqrt(12*(1 + 1/6*a_w)) = 6.55898 in
# Critical stress, F_cr := if I_yc/I_y ≤ 0.23 J ← 0 C_b*π^2*E/(L_b/r_t)^2*sqrt(1 + 0.078*J/(S_xc*h_0)*(L_b/r_t)^2) = 15.2015 ksi
# Nominal compression flange stress above which the inelastic buckling limit states apply
# F_L := if S_xt/S_xc ≥ 0.7 0.7*F_y else max(0.5*F_y, F_y*S_xt/S_xc) = 35 ksi
#
# Therefore, L_p := 1.1*r_t*sqrt(E/F_y) = 14.4798 ft
#
# Limiting unbraced length for inelastic LTB
# L_r := 1.95*r_t*E/F_L*sqrt(J/(S_xc*h_0) + sqrt((J/(S_xc*h_0))^2 + 6.76*(F_L/E)^2)) = 56.2377 ft
#
# M_n_LTB(Lb) := if Lb ≤ L_p R_pc*M_yc else if Lb ≤ L_r min(C_b*(R_pc*M_yc - (R_pc*M_yc - F_L*S_xc)*((Lb - L_p)/(L_r - L_p))), R_pc*M_yc) else min(F_cr(Lb)*S_xc, M_p) ∴ M_n_LTB(L_b) =
M_n_LTB(Lb) :=
    □  # error: Missing term or expression.  # ∴ M_n_LTB(L_b) =
# 2.  Compression Flange Local Buckling
# Determine nominal moment dependent on the flange being noncompact or slender
M_n_FLB :=
    λ ← b_2tf
    if λ < λ_rf
        M_p - (M_p - 0.7*F_y*S_x)*((λ - λ_pf)/(λ_rf - λ_pf))
    else
        k_c ← max(0.35, min(0.76, 4/sqrt(h_tw)))
        0.9*E*k_c*S_x/λ^2  # error: This variable is undefined. Check that the label is set correctly.  # ∴ M_n_FLB =
# Prep for Graphing
#
# max_L := max(50 ft, 1.15*max(L_r, L_b)) = 86.25 ft
# max_M1_LRFD := ϕ*Z_x*F_y = 10968.7 kip*ft  max_M2_ASD := Z_x*F_y/Ω = 7297.9 kip*ft
Lb_x := 0 ft, max_L/1000 .. max_L
# Governing Flexural Strength/Resistance
# For an unbraced length of L_b = 75 ft  →  M_n := min(M_n_LTB(L_b), M_n_FLB)
#
# ∴ For LRFD, ϕM_n := ϕ*M_n  and for ASD, M_n/Ω =
# [chart]
    X[1] := Lb_x/ft
    Y[1] := ϕ*M_n_LTB(Lb_x)/(kip*ft)
    X[2] := Lb_x/ft
    Y[2] := M_n_LTB(Lb_x)/(Ω*kip*ft)
    X[3] := Lb_x/ft  # error: Plotting failed. Replace complex values and NaNs for this trace by real numbers.
    Y[3] := min(ϕ*M_n_LTB(Lb_x)/(kip*ft), ϕ*M_n_FLB/(kip*ft))  # error: Plotting failed. Replace complex values and NaNs for this trace by real numbers.
    X[4] := Lb_x/ft
    Y[4] := min(M_n_LTB(Lb_x)/Ω/(kip*ft), M_n_FLB/Ω/(kip*ft))
